// SBML level 3 version 1
// dcterms:bibliographicCitation: urn:miriam:pubmed:26861829

function Constant_flux__irreversible(v)
  v;
end
Constant_flux__irreversible is "Constant flux (irreversible)";

function extra_growth(mod, k1, k2, pro)
  mod*pro/(k1 + k2*mod);
end

function t_d_agm(dt, delta, A, Tp)
  dt*(1 + delta*A)*Tp;
end
t_d_agm is "t-d-agm";

function t_g_ngf(Tp, rtp, G, t1, t2, kt, ONn)
  7/8*Tp*(rtp + G/(t1 + t2*G))*(1 - Tp/kt)*(Tp/ONn - 1);
end
t_g_ngf is "t-g-ngf";

function uptake(y, Tp, n)
  y*Tp*n;
end

function migration(u0, u1, A, u2, Na, Tp)
  (u0 + u1*A + u2*Na)*Tp;
end

function _1nd_growth(const, product)
  const*product;
end

function _1par_growth(const, mod)
  const*mod;
end

function internalisation(k1, Tp, k2, S, P, sub)
  (k1*Tp + k2*(S + P))*sub;
end

function n_g(r, n, k)
  r*(1 - n/k)*n;
end
n_g is "n-g";

model Lolas2016___tumour_induced_neoneurogenesis_and_perineural_tumour_growth()
  // Lolas2016 - tumour-induced neoneurogenesis and perineural tumour growth
  // The paper describes a model of tumour-induced neoneurogenesis and perineural tumour growth. Created by COPASI 4.25 (Build 207) This model is described in the article: Tumour-induced neoneurogenesis and perineural tumour growth: a mathematical approach Georgios Lolas, Arianna Bianchi and Konstantinos N. Syrigos Scientific Reports 6:20684 Abstract: It is well-known that tumours induce the formation of a lymphatic and a blood vasculature around themselves. A similar but far less studied process occurs in relation to the nervous system and is referred to as neoneurogenesis. The relationship between tumour progression and the nervous system is still poorly understood and is likely to involve a multitude of factors. It is therefore relevant to study tumour-nerve interactions through mathematical modelling: this may reveal the most significant factors of the plethora of interacting elements regulating neoneurogenesis. The present work is a first attempt to model the neurobiological aspect of cancer development through a system of differential equations. The model confirms the experimental observations that a tumour is able to promote nerve formation/elongation around itself, and that high levels of nerve growth factor and axon guidance molecules are recorded in the presence of a tumour. Our results also reflect the observation that high stress levels (represented by higher norepinephrine release by sympathetic nerves) contribute to tumour development and spread, indicating a mutually beneficial relationship between tumour cells and neurons. The model predictions suggest novel therapeutic strategies, aimed at blocking the stress effects on tumour growth and dissemination. To cite BioModels Database, please use: BioModels Database: An enhanced, curated and annotated resource for published quantitative kinetic models . To the extent possible under law, all copyright and related or neighbouring rights to this encoded model have been dedicated to the public domain worldwide. Please refer to CC0 Public Domain Dedication for more information.
  // isDescribedBy pubmed:26861829
  // isVersionOf GO:0022008
  // isVersionOf ncit:C19365
  // isVersionOf ncit:C48260
  // hasProperty mamo:MAMO_0000046
  // hasTaxon taxonomy:9606
  // model units - substance: substance, time: time, volume: volume, area: area, length: length, extent: substance

  // Compartments:
  compartment tumor_microenvironment = 1 volume;  // isVersionOf ncit:C94498

  // Species:
  // 100000 or 50000
  // primary tumor cells
  species Tp in tumor_microenvironment = 100000;  // isVersionOf CL:0001063
  // migrating tumor cells
  species Tm in tumor_microenvironment = 0;  // isVersionOf CL:0001063
  // nerve growth factor pg
  species G in tumor_microenvironment = 0;  // isVersionOf ncit:C20424
  // axon guidance molecules pg
  species A in tumor_microenvironment = 0;  // isInstanceOf GO:0007411
  // sympathetic neurons
  species S in tumor_microenvironment = 0.26;  // isVersionOf CL:0011103
  // parasympathetic neurons
  species P in tumor_microenvironment = 0.03;  // isVersionOf CL:0011102
  // norepinephrine pg
  species Nn in tumor_microenvironment = 0.5;  // CHEBI:33569
  // acetocholine pg
  species Na in tumor_microenvironment = 80;  // CHEBI:15355

  // Parameters:
  // primary tumour cell basal growth rate
  rtp = 0.000481 unit_0;
  // migrating tumour cell basal growth rate
  rtm = 0.0001 unit_0;
  // NGF-dependence of tumour cell growth rate
  t1 = 134.27 unit_1;  // isVersionOf ncit:C67363
  // NGF-dependence of tumour cell growth rate
  t2 = 2.39 unit_2;  // isVersionOf ncit:C67363
  // maximum tumour cell density (carrying capacity)
  kt = 1000000 unit_3;
  // tumour cell Allee threshold in absence of norepinephrine
  theta1 = 10000 unit_3;  // isVersionOf ncit:C48228
  // norepinephrine-dependence of tumour cell Allee threshold
  theta2 = 1 unit_4;  // isVersionOf ncit:C48228
  // tumour cell death rate
  dt = 0.0127 unit_0;  // isVersionOf ncit:C53346
  // AGM-dependence of tumour cell apoptosis
  delta = 0.0129 unit_4;  // isVersionOf ncit:C67363
  // spontaneous tumour cell migration rate
  u0 = 0.22 unit_0;  // isVersionOf ncit:C25636
  // AGM-dependence of tumour cell migration
  u1 = 9.8e-6 unit_5;  // isVersionOf ncit:C67363
  // acetylcholine-dependence of tumour cell migration
  u2 = 0.002 unit_5;  // isVersionOf ncit:C67363
  // NGF production rate by tumour cells
  sg = 0.00222 unit_0;
  // NGF decay rate
  dg = 22.18 unit_0;  // isVersionOf ncit:C25636
  // NGF internalisation rate by tumour cells
  y1 = 5.57e-5 unit_5;  // isVersionOf ncit:C25636
  // NGF internalisation rate by nerve cells
  y2 = 0.05 unit_5;  // isVersionOf ncit:C25636
  // AGM secretion rate by tumour cells
  sA = 0.00542 unit_0;
  // AGM decay rate
  dA = 2.4 unit_0;  // isVersionOf ncit:C25636
  // AGM internalisation rate by tumour cells
  y3 = 1e-5 unit_5;  // isVersionOf ncit:C25636
  // AGM internalisation rate by nerve cells
  y4 = 1.47e-5 unit_5;  // isVersionOf ncit:C25636
  // SNC basal growth rate
  rs = 0.06 unit_0;
  // SNC carrying capacity
  ks = 0.26 unit_3;
  // NGF-dependence of SNC growth rate
  sigma1 = 129 unit_1;  // isVersionOf ncit:C67363
  // NGF-dependence of SNC growth rate
  sigma2 = 50 unit_2;  // isVersionOf ncit:C67363
  // AGM-dependence of SNC growth rate
  sigma3 = 7.79 unit_1;  // isVersionOf ncit:C67363
  // AGM-dependence of SNC growth rate
  sigma4 = 0.01 unit_2;  // isVersionOf ncit:C67363
  // PNC basal growth rate
  rp = 7 unit_0;
  // PNC carrying capacity
  kp = 0.03 unit_3;
  // NGF-dependence of PNC growth rate
  p1 = 0.33 unit_0;  // isVersionOf ncit:C67363
  // NGF-dependence of PNC growth rate
  p2 = 0.1 unit_2;  // isVersionOf ncit:C67363
  // AGM-dependence of PNC growth rate
  p3 = 1 unit_1;  // isVersionOf ncit:C67363
  // AGM-dependence of PNC growth rate
  p4 = 0.01 unit_2;  // isVersionOf ncit:C67363
  // norepinephrine constant source
  cn = 0.41 unit_6;  // isVersionOf ncit:C25636
  // norepinephrine production rate by SNC
  // =1.6 normal
  // =16 for stress condition
  sn = 1.6 unit_0;
  // norepinephrine decay rate
  dn = 1.66 unit_0;  // isVersionOf ncit:C25636
  // norepinephrine uptake rate by tumour cells
  y5 = 0.002 unit_5;  // isVersionOf ncit:C25636
  // acetylcholine constant source
  ca = 3990 unit_6;  // isVersionOf ncit:C25636
  // acetylcholine production rate by PNC
  sa = 0.73 unit_0;
  // acetylcholine decay rate
  da = 49.91 unit_0;  // isVersionOf ncit:C25636
  // acetylcholine uptake rate by tumour cells
  y6 = 0.001 unit_5;  // isVersionOf ncit:C25636
  ONn has unit_3;  // isVersionOf ncit:C44175

  // Assignment rules:
  ONn := theta1/(1 + theta2*Nn);

  // Reactions:
  tumor_growth_NGF__logistic: => Tp; tumor_microenvironment*t_g_ngf(Tp, rtp, G, t1, t2, kt, ONn); tumor_growth_NGF__logistic is "tumor growth-NGF, logistic";  // modifiers: G; isVersionOf GO:0008283
  tumor_death_AGM: Tp => ; tumor_microenvironment*t_d_agm(dt, delta, A, Tp); tumor_death_AGM is "tumor death-AGM";  // modifiers: A; isVersionOf GO:0008219
  tumor_migration: Tp => Tm; tumor_microenvironment*migration(u0, u1, A, u2, Na, Tp);  // modifiers: A, Na; isVersionOf GO:0016477
  migrating_tumor_cell_growth: => Tm; tumor_microenvironment*_1nd_growth(rtm, Tm);  // isVersionOf GO:0008283
  migrating_cell_death: Tm => ; tumor_microenvironment*dt*Tm;  // isVersionOf GO:0008219
  NGF_production: => G; tumor_microenvironment*_1par_growth(sg, Tp);  // modifiers: Tp; isVersionOf GO:0023061
  NGF_decay: G => ; tumor_microenvironment*dg*G;
  NGF_internalisation: G => ; tumor_microenvironment*internalisation(y1, Tp, y2, S, P, G);  // modifiers: Tp, S, P; isVersionOf GO:0098657
  AGM_production: => A; tumor_microenvironment*_1par_growth(sA, Tp);  // modifiers: Tp; isVersionOf GO:0023061
  AGM_decay: A => ; tumor_microenvironment*dA*A;
  AGM_internalisation: A => ; tumor_microenvironment*internalisation(y3, Tp, y4, S, P, A);  // modifiers: Tp, S, P; isVersionOf GO:0098657
  sympathetic_neuron_growth: => S; tumor_microenvironment*n_g(rs, S, ks);  // isVersionOf GO:0008283
  sympathetic_neuron_growth_NGF: => S; tumor_microenvironment*extra_growth(G, sigma1, sigma2, S); sympathetic_neuron_growth_NGF is "sympathetic neuron growth-NGF";  // modifiers: G; isVersionOf GO:0008283
  sympathetic_neuron_growth_AGM: => S; tumor_microenvironment*extra_growth(A, sigma3, sigma4, S); sympathetic_neuron_growth_AGM is "sympathetic neuron growth-AGM";  // modifiers: A; isVersionOf GO:0008283
  parasym_neuron_growth: => P; tumor_microenvironment*n_g(rp, P, kp);  // isVersionOf GO:0008283
  parasym_neuron_growth_NGF: => P; tumor_microenvironment*extra_growth(G, p1, p2, P); parasym_neuron_growth_NGF is "parasym neuron growth-NGF";  // modifiers: G; isVersionOf GO:0008283
  parasym_neuron_growth_AGM: => P; tumor_microenvironment*extra_growth(A, p3, p4, P); parasym_neuron_growth_AGM is "parasym neuron growth-AGM";  // modifiers: A; isVersionOf GO:0008283
  norepinephrine_source: => Nn; tumor_microenvironment*Constant_flux__irreversible(cn);
  norepinephrine_by_SNC: => Nn; tumor_microenvironment*_1par_growth(sn, S);  // modifiers: S; isVersionOf GO:0023061
  norepinephrine_decay: Nn => ; tumor_microenvironment*dn*Nn;
  norepinephrine_uptake_tumor: Nn => ; tumor_microenvironment*uptake(y5, Tp, Nn); norepinephrine_uptake_tumor is "norepinephrine uptake-tumor";  // modifiers: Tp; isVersionOf GO:0098657
  ACh_source: => Na; tumor_microenvironment*Constant_flux__irreversible(ca);
  ACh_by_PNC: => Na; tumor_microenvironment*_1par_growth(sa, P);  // modifiers: P; isVersionOf GO:0023061
  ACh_decay: Na => ; tumor_microenvironment*da*Na;
  ACh_uptake_tumor: Na => ; tumor_microenvironment*uptake(y6, Tp, Na); ACh_uptake_tumor is "ACh uptake-tumor";  // modifiers: Tp; isVersionOf GO:0098657

  // Unit definitions:
  unit length = metre;
  unit area = metre^2;
  unit volume = 1e-3 litre;
  unit time = 86400 second;
  unit substance = 1e-3 mole;
  unit unit_0 = 1 / (8640 second); unit_0 is "1/d";
  unit unit_1 = 8640 second / (1e-3 metre)^3; unit_1 is "d/mm^3";
  unit unit_2 = 8640 second; unit_2 is "d";
  unit unit_3 = 1 / (1e-3 metre)^3; unit_3 is "1/mm^3";
  unit unit_4 = (1e-3 metre)^3; unit_4 is "mm^3";
  unit unit_5 = (1e-3 metre)^3 / (8640 second); unit_5 is "mm^3/d";
  unit unit_6 = 1 / ((1e-3 metre)^3 * 8640 second); unit_6 is "1/(mm^3*d)";
end
