// SBML level 3 version 1
// dcterms:bibliographicCitation: urn:miriam:pubmed:25882747

function inf(dv, V, U, hu)
  dv*V*U/(hu + U);
end

function tg(r, U, I, K)
  r*U*(1 - (U + I)/K);
end

function exh(dt, U, E)
  dt*U*E;
end

function kill(du, x, E, he)
  du*x*E/(he + E);
end

function burst(d, b, I)
  d*b*I;
end

function mg(pm, V, M, m, hv)
  pm*V*M*(1 - M/m)/(hv + V);
end

function eg(pe, M, U, V, hv)
  pe*M*(U + V)/(U + V + hv);
end

model Macnamara2015_1___virotherapy_full_model()
  // Macnamara2015/1 - virotherapy full model
  // The paper describes a full model of oncolytic virotherapy. Created by COPASI 4.25 (Build 207) This model is described in the article: Memory versus effector immune responses in oncolytic virotherapies Cicely Macnamara, Raluca Eftimie Abstract: The main priority when designing cancer immuno-therapies has been to seek viable biological mechanisms that lead to permanent cancer eradica- tion or cancer control. Understanding the delicate balance between the role of effector and memory cells on eliminating cancer cells remains an elusive problem in immunology. Here we make an initial investigation into this problem with the help of a mathematical model for oncolytic virotherapy; although the model can in fact be made general enough to be applied also to other immunological problems. Our results show that long-term cancer con- trol is associated with a large number of persistent effector cells (irrespective of the initial peak in effector cell numbers). However, this large number of persistent effector cells is sustained by a relatively large number of memory cells. Moreover, we show that cancer control from a dormant state cannot be predicted by the size of the memory population. To cite BioModels Database, please use: BioModels Database: An enhanced, curated and annotated resource for published quantitative kinetic models . To the extent possible under law, all copyright and related or neighbouring rights to this encoded model have been dedicated to the public domain worldwide. Please refer to CC0 Public Domain Dedication for more information.
  // isDescribedBy pubmed:25882747
  // hasProperty ncit:C62713
  // hasProperty mamo:MAMO_0000046
  // hasTaxon taxonomy:9606
  // biomodels.db:MODEL1907290002 biomodels.db:BIOMD0000000766
  // model units - substance: substance, time: time, volume: volume, area: area, length: length, extent: substance

  // Compartments:
  compartment tme = 1 volume;  // isVersionOf ncit:C94498

  // Species:
  // uninfected cancer cells
  species U in tme = 1000000;  // isVersionOf CL:0001064
  // infected cancer cells
  species I in tme = 0;  // isVersionOf CL:0001064
  // 1-10000
  // memory cells
  // plotted 1/200/300/344/345/400
  species M in tme = 1;  // isVersionOf ncit:C122731
  // effector cells
  species E in tme = 0;  // isVersionOf ncit:C28241
  // virus particles pfu
  // 0-1e6
  species V in tme = 1;  // isVersionOf ncit:C717

  // Parameters:
  // proliferation rate for tumour cells
  r = 0.927 unit_0;
  // carrying capacity for the tumour cells
  K = 181820000 unit_1;
  // infection rate of tumour cells with the oncolytic virus
  dv = 0.0038 unit_0;  // isVersionOf ncit:C25636
  // lysis rate of tumour cells (infected and uninfec- ted) by the immune cells
  du = 2 unit_0;  // isVersionOf ncit:C25636
  // half-saturation constant for the tumour cells in- fected with the oncolytic virus
  hu = 1 unit_1;
  // half-saturation constant for the effector cells that support half the maximum killing rate
  he = 1000 unit_1;
  // half-saturation constant of (viral and tumour) antigens that induce half the maximum proliferation rate of immune cells
  hv = 10000 unit_1;
  // rate at which the oncolytic virus kills the tumor cells
  delta = 1 unit_0;  // isVersionOf ncit:C25636
  // proliferation rate of memory cells following sec- ondary encounter with tumor antigens carried by virus particles
  pm = 2.5 unit_0;
  // carrying capacity for memory cells
  m = 10000 unit_1;
  // rate at which memory cells become effector cells following secondary encounter with tumor antigens carried by virus particles
  pe = 0.4 unit_0;
  // death rate of effector cells
  de = 0.1 unit_0;  // isVersionOf ncit:C25636
  // inactivation rate of immune effector cells by the tumor cells
  dt = 5e-9 unit_0;  // isVersionOf ncit:C25636
  // decay rate for the concentration of oncolytic virus (VSV) particles in the blood
  w = 2.042 unit_0;  // isVersionOf ncit:C25636
  // number of virus (VSV) particles released from an infected cell, capable of forming plaques
  b = 1000 unit_1;  // isVersionOf ncit:C84380

  // Reactions:
  tumor_growth: => U; tme*tg(r, U, I, K);  // modifiers: I; isVersionOf GO:0008283
  tumor_infection: U => I; tme*inf(dv, V, U, hu);  // modifiers: V
  tumor_killing: U => ; tme*kill(du, U, E, he);  // modifiers: E; isVersionOf GO:0002419
  infected_tumor_death: I => ; tme*delta*I;  // isVersionOf GO:0008219
  infected_tumor_killing: I => ; tme*kill(du, I, E, he);  // modifiers: E; isVersionOf GO:0002419
  memory_cell_growth: => M; tme*mg(pm, V, M, m, hv);  // modifiers: V; isVersionOf GO:0008283
  effector_growth: => E; tme*eg(pe, M, U, V, hv);  // modifiers: M, U, V; isVersionOf GO:0008283
  effector_death: E => ; tme*de*E;  // isVersionOf GO:0008219
  effector_exhaustion: E => ; tme*exh(dt, U, E);  // modifiers: U; isVersionOf GO:0008219
  virus_burst: => V; tme*burst(delta, b, I);  // modifiers: I
  virus_clearance: V => ; tme*w*V;

  // Unit definitions:
  unit length = metre;
  unit area = metre^2;
  unit volume = 1e-3 litre;
  unit time = 86400 second;
  unit substance = 1e-3 mole;
  unit unit_0 = 1 / (8640 second); unit_0 is "1/d";
  unit unit_1 = dimensionless^0;
end
