// SBML level 3 version 1
// dcterms:bibliographicCitation: urn:miriam:pubmed:29605227

function s_t(r2, T, q, p2)
  2*r2*T*q*(1 - p2);
end
s_t is "s+t";

function t_s(r1, S, p1)
  2*r1*S*(1 - p1);
end
t_s is "t+s";

function t(p2, r2, T)
  (2*p2 - 1)*r2*T;
end
t is "t+";

function diff(r2, T, p2, q)
  2*r2*T*(1 - p2)*(1 - q);
end

function s(p1, r1, S)
  (2*p1 - 1)*r1*S;
end
s is "s+";

model Wodarz2018_2___model_with_transit_amplifying_cells()
  // Wodarz2018/2 - model with transit amplifying cells
  // The paper describes a model of effect of cellular de-differentiation on the dynamics and evolution of tissue and tumor cells. Created by COPASI 4.25 (Build 207) This model is described in the article: Effect of cellular de-differentiation on the dynamics and evolution of tissue and tumor cells in mathematical models with feedback regulation Dominik Wodarz J Theor Biol. 2018 July 07; 448: 86–93 Abstract: Tissues are maintained by adult stem cells that self-renew and also differentiate into functioning tissue cells. Homeostasis is achieved by a set of complex mechanisms that involve regulatory feedback loops. Similarly, tumors are believed to be maintained by a minority population of cancer stem cells, while the bulk of the tumor is made up of more differentiated cells, and there is indication that some of the feedback loops that operate in tissues continue to be functional in tumors. Mathematical models of such tissue hierarchies, including feedback loops, have been analyzed in a variety of different contexts. Apart from stem cells giving rise to differentiated cells, it has also been observed that more differentiated cells can de-differentiate into stem cells, both in healthy tissue and tumors, aspects of which have also been investigated mathematically. This paper analyses the effect of de-differentiation on the basic and evolutionary dynamics of cells in the context of tissue hierarchy models that include negative feedback regulation of the cell populations. The models predict that in the presence of de-differentiation, the fixation probability of a neutral mutant is lower than in its absence. Therefore, if de-differentiation occurs, a mutant with identical parameters compared to the wild-type cell population behaves like a disadvantageous mutant. Similarly, the process of de-differentiation is found to lower the fixation probability of an advantageous mutant. These results indicate that the presence of de- differentiation can lower the rates of tumor initiation and progression in the context of the models considered here. To cite BioModels Database, please use: BioModels Database: An enhanced, curated and annotated resource for published quantitative kinetic models . To the extent possible under law, all copyright and related or neighbouring rights to this encoded model have been dedicated to the public domain worldwide. Please refer to CC0 Public Domain Dedication for more information.
  // isDescribedBy pubmed:29605227
  // hasProperty mamo:MAMO_0000046
  // hasProperty GO:0002418
  // hasTaxon taxonomy:9606
  // biomodels.db:MODEL1908010002 biomodels.db:BIOMD0000000773
  // model units - substance: substance, time: time, volume: volume, area: area, length: length, extent: substance

  // Compartments:
  compartment tme = 1 volume;  // isVersionOf ncit:C94498

  // Species:
  // stem cells
  species S in tme = 1;  // isVersionOf CL:0000034
  // transit amplifying cells
  species T in tme = 0;  // isVersionOf CL:0000000
  // differentiated cells
  species D in tme = 0;  // isVersionOf CL:0000000

  // Parameters:
  // 0.7 or 0.35
  p1 = 0.7 unit_0; p1 is "p1'";  // isVersionOf ncit:C54154
  // stem cell division rate
  r1 = 0.01 unit_0; r1 is "r1'";
  p2 = 0.4 unit_0; p2 is "p2'";  // isVersionOf ncit:C54154
  // ta cell division rate
  r2 = 0.02 unit_0; r2 is "r2'";
  // 0.4 or 0.15
  q = 0.4 unit_0; q is "q'";  // isVersionOf ncit:C54154
  // differentiated cell death rate
  a = 0.0025 unit_0;  // isVersionOf ncit:C25636
  h1 = 0.0001 unit_0;  // isVersionOf ncit:C84380
  h2 = 0.0001 unit_0;  // isVersionOf ncit:C84380
  h3 = 0.0001 unit_0;  // isVersionOf ncit:C84380
  h4 = 0.0001 unit_0;  // isVersionOf ncit:C84380
  h5 = 0.01 unit_0;  // isVersionOf ncit:C84380
  k1 = 1 unit_0;  // isVersionOf ncit:C48923
  k2 = 1 unit_0;  // isVersionOf ncit:C48923
  k3 = 1 unit_0;  // isVersionOf ncit:C48923
  k4 = 1 unit_0;  // isVersionOf ncit:C48923
  k5 = 1 unit_0;  // isVersionOf ncit:C48923
  // stem cell division rate
  r1_0 has unit_0;
  // ta cell division rate
  r2_0 has unit_0;
  p1_0 has unit_0;  // isVersionOf ncit:C54154
  p2_0 has unit_0;  // isVersionOf ncit:C54154
  q_0 has unit_0;  // isVersionOf ncit:C54154

  // Assignment rules:
  r2_0 := r2/(1 + h3*D^k3);
  p1_0 := p1/(1 + h2*D^k2);
  p2_0 := p2/(1 + h4*D^k4);
  r1_0 := r1/(1 + h1*D^k1);
  q_0 := q/(1 + h5*S^k5);

  // Reactions:
  stem_cell_division: => S; tme*s(p1_0, r1_0, S);  // isVersionOf GO:0008283
  stem_cell_activation: => S; tme*s_t(r2_0, T, q_0, p2_0);  // modifiers: T; isVersionOf GO:0008283
  activation_cell_division_from_stem: => T; tme*t_s(r1_0, S, p1_0);  // modifiers: S; isVersionOf GO:0008283
  activation_cell_renewal: => T; tme*t(p2_0, r2_0, T);  // isVersionOf GO:0008283
  differentiation_of_cell: => D; tme*diff(r2_0, T, p2_0, q_0);  // modifiers: T; isVersionOf GO:0030154
  differentiation_cell_death: D => ; tme*a*D;  // isVersionOf GO:0008219

  // Unit definitions:
  unit length = metre;
  unit area = metre^2;
  unit volume = 1e-3 litre;
  unit time = second;
  unit substance = 1e-3 mole;
  unit unit_0 = dimensionless^0; unit_0 is "1";
end
