// SBML level 3 version 1
// dcterms:bibliographicCitation: urn:miriam:pubmed:22300422

function deplete(rate, mod, sub)
  rate*mod*sub;
end

function ang(e, T, A, k4)
  e*T*A*(1 - A/k4);
end

function logistic(a, pro, k)
  a*pro*(1 - pro/k);
end

model Yang2012___cancer_growth_with_angiogenesis()
  // Yang2012 - cancer growth with angiogenesis
  // The paper describes a model of tumor growth with angiogenesis. Created by COPASI 4.26 (Build 213) This model is described in the article: Mathematical modeling of solid cancer growth with angiogenesis Hyun M Yang Theoretical Biology and Medical Modelling 2012, 9:2 Abstract: Background: Cancer arises when within a single cell multiple malfunctions of control systems occur, which are, broadly, the system that promote cell growth and the system that protect against erratic growth. Additional systems within the cell must be corrupted so that a cancer cell, to form a mass of any real size, produces substances that promote the growth of new blood vessels. Multiple mutations are required before a normal cell can become a cancer cell by corruption of multiple growth-promoting systems. Methods: We develop a simple mathematical model to describe the solid cancer growth dynamics inducing angiogenesis in the absence of cancer controlling mechanisms. Results: The initial conditions supplied to the dynamical system consist of a perturbation in form of pulse: The origin of cancer cells from normal cells of an organ of human body. Thresholds of interacting parameters were obtained from the steady states analysis. The existence of two equilibrium points determine the strong dependency of dynamical trajectories on the initial conditions. The thresholds can be used to control cancer. Conclusions: Cancer can be settled in an organ if the following combination matches: better fitness of cancer cells, decrease in the efficiency of the repairing systems, increase in the capacity of sprouting from existing vascularization, and higher capacity of mounting up new vascularization. However, we show that cancer is rarely induced in organs (or tissues) displaying an efficient (numerically and functionally) reparative or regenerative mechanism. To cite BioModels Database, please use: BioModels Database: An enhanced, curated and annotated resource for published quantitative kinetic models . To the extent possible under law, all copyright and related or neighbouring rights to this encoded model have been dedicated to the public domain worldwide. Please refer to CC0 Public Domain Dedication for more information.
  // isDescribedBy pubmed:22300422
  // hasProperty mamo:MAMO_0000046
  // hasProperty ncit:C19361
  // hasTaxon taxonomy:9606
  // biomodels.db:MODEL1908140001 biomodels.db:BIOMD0000000796
  // model units - substance: substance, time: time, volume: volume, area: area, length: length, extent: substance

  // Compartments:
  compartment tme = 1 volume;  // isVersionOf ncit:C94498

  // Species:
  // normal cell
  species C in tme = 9;  // isVersionOf CL:0000000
  // endothelial cell
  species E in tme = 10;  // isVersionOf CL:0000115
  // cancer cell
  // 1.023 or 1.024 initially
  species T in tme = 1.023;  // isVersionOf CL:0001064
  // pre-angiogenesis cell
  species P in tme = 0;  // isVersionOf CL:0000000
  // angiogenesis cell
  species A in tme = 0;  // isVersionOf CL:0000000

  // Parameters:
  // Intrinsic growth rate of normal cells
  a1 = 0.1 unit_0;
  // Intrinsic growth rate of epithelial cells
  a2 = 0.1 unit_0;
  // 0.2 or 5
  // Intrinsic growth rate of cancer cells
  a3 = 0.2 unit_0;
  // 0.01 or 0.1
  // Intrinsic growth rate of angiogenesis cells
  e = 0.01 unit_0;
  // Mortality rate of normal cells
  u1 = 0.01 unit_0;  // isVersionOf ncit:C25636
  // Mortality rate of epithelial cells
  u2 = 0.05 unit_0;  // isVersionOf ncit:C25636
  // 0.05 or 0.005
  // Mortality rate of cancer cells
  u3 = 0.05 unit_0;  // isVersionOf ncit:C25636
  // Mortality rate of pre-angiogenesis cells
  u4 = 0.01 unit_0;  // isVersionOf ncit:C25636
  // Mortality rate of angiogenesis cells
  u5 = 0.01 unit_0;  // isVersionOf ncit:C25636
  // Carrying capacity of normal cells
  k1 = 10 unit_1;
  // Carrying capacity of epithelial cells
  k2 = 20 unit_1;
  // 5 or 0.1
  // Carrying capacity of cancer cells
  k3 = 5 unit_1;
  // 1 or 0.2
  // Carrying capacity of angiogenesis cells
  k4 = 1 unit_1;
  // Transfer rate from pre-angiogenesis to angiogenesis cells
  d = 0.1 unit_0;  // isVersionOf ncit:C25636
  // 0.01 or 0.02
  // Epithelial sprouting rate
  y = 0.01 unit_0;
  // Rate of inhibition of normal cells by cancer cells
  b1 = 0.01 unit_0;  // isVersionOf ncit:C25636
  // Rate of inhibition of cancer cells by normal cells
  b2 = 0.01 unit_0;  // isVersionOf ncit:C25636
  // normal cell
  C_plot has unit_1;  // isVersionOf CL:0000000
  // endothelial cell
  E_plot has unit_1;  // isVersionOf CL:0000115
  // cancer cell
  T_plot has unit_1;  // isVersionOf CL:0001064
  // pre-angiogenesis cell
  P_plot has unit_1;  // isVersionOf CL:0000000
  // angiogenesis cell
  A_plot has unit_1;  // isVersionOf CL:0000000
  // plot coefficient of C
  c1 = 10 unit_1;  // isVersionOf ncit:C48922
  // plot coefficient of E
  c2 = 10 unit_1;  // isVersionOf ncit:C48922
  // plot coefficient of T
  c3 = 1 unit_1;  // isVersionOf ncit:C48922
  // plot coefficient of P
  c4 = 0.25 unit_1;  // isVersionOf ncit:C48922
  // plot coefficient of A
  c5 = 1 unit_1;  // isVersionOf ncit:C48922

  // Assignment rules:
  P_plot := P/c4;
  E_plot := E/c2;
  A_plot := A;
  C_plot := C/c1;
  T_plot := T;

  // Reactions:
  normal_cell_growth: => C; tme*logistic(a1, C, k1);  // isVersionOf GO:0008283
  normal_cell_death: C => ; tme*u1*C;  // isVersionOf GO:0008219
  normal_cell_depletion: C => ; tme*deplete(b1, T, C);  // modifiers: T; isVersionOf GO:0008219
  endothelial_growth: => E; tme*logistic(a2, E, k2);  // isVersionOf GO:0008283
  endothelial_death: E => ; tme*u2*E;  // isVersionOf GO:0008219
  pre_angiogenesis: E => P; tme*deplete(y, T, E); pre_angiogenesis is "pre-angiogenesis";  // modifiers: T; isVersionOf GO:0001525
  tumor_growth: => T; tme*ang(a3, A, T, k3);  // modifiers: A; isVersionOf GO:0008283
  tumor_death: T => ; tme*u3*T;  // isVersionOf GO:0008219
  tumor_depletion: T => ; tme*deplete(b2, C, T);  // modifiers: C; isVersionOf GO:0008219
  pa_death: P => ; tme*u4*P;  // isVersionOf GO:0008219
  pa_conversion: P => A; tme*d*P;  // isVersionOf GO:0001525
  angiogenesis: => A; tme*ang(e, T, A, k4);  // modifiers: T; GO:0001525; isVersionOf GO:0008219
  angiogenesis_cell_death: A => ; tme*u5*A;  // isVersionOf GO:0008219

  // Unit definitions:
  unit length = metre;
  unit area = metre^2;
  unit volume = 1e-3 litre;
  unit time = 86400 second;
  unit substance = 1e-3 mole;
  unit unit_0 = 1 / (8640 second); unit_0 is "1/d";
  unit unit_1 = dimensionless^0;
end
