// SBML level 3 version 1
// dcterms:bibliographicCitation: urn:miriam:pubmed:26643942

function oc(ac, C, gcc, B, gcb, hct, T)
  ac*C^gcc*B^gcb*(1 + hct*T);
end

function t(at, C, gtc, T, gtt)
  at*C^gtc*T^gtt;
end

function ob(ab, C, gbc, B, gbb, hbt, T)
  ab*C^gbc*B^gbb*(1 - hbt*T);
end

model Koenders2015___multiple_myeloma()
  // Koenders2015 - multiple myeloma
  // The paper describes a model of multiple myeloma. Created by COPASI 4.26 (Build 213) This model is described in the article: A mathematical model of cell equilibrium and joint cell formation in multiple myeloma M.A. Koenders, R. Saso Journal of Theoretical Biology 390 (2016) 73–79 Abstract: In Multiple Myeloma Bone Disease healthy bone remodelling is affected by tumour cells by means of paracrine cytokinetic signalling in such a way that osteoclast formation is enhanced and the growth of osteoblast cells inhibited. The participating cytokines are described in the literature. Osteoclast-induced myeloma cell growth is also reported. Based on existing mathematical models for healthy bone remo- delling a three-way equilibrium model is presented for osteoclasts, osteoblasts and myeloma cell populations to describe the progress of the illness in a scenario in which there is a secular increase in the cytokinetic interactive effectiveness of paracrine processes. The equilibrium state for the system is obtained. The paracrine interactive effectiveness is explored by parameter variation and the stable region in the parameter space is identified. Then recently-discovered joint myeloma–osteoclast cells are added to the model to describe the populations inside lytic lesions. It transpires that their presence expands the available parameter space for stable equilibrium, thus permitting a detrimental, larger population of osteoclasts and myeloma cells. A possible relapse mechanism for the illness is explored by letting joint cells dissociate. The mathematics then permits the evaluation of the evolution of the cell populations as a function of time during relapse. To cite BioModels Database, please use: BioModels Database: An enhanced, curated and annotated resource for published quantitative kinetic models . To the extent possible under law, all copyright and related or neighbouring rights to this encoded model have been dedicated to the public domain worldwide. Please refer to CC0 Public Domain Dedication for more information.
  // isDescribedBy pubmed:26643942
  // hasProperty efo:0001378
  // hasProperty mamo:MAMO_0000046
  // hasTaxon taxonomy:9606
  // biomodels.db:MODEL1908290002 biomodels.db:BIOMD0000000804
  // model units - substance: substance, time: time, volume: volume, area: area, length: length, extent: substance

  // Compartments:
  compartment tme = 1 volume;  // isVersionOf ncit:C94498

  // Species:
  // osteoclast
  species C in tme = 1.1*3000^(2/3)/200;  // isVersionOf CL:0000092
  // osteoblast
  species B in tme = 3000^(2/3);  // isVersionOf CL:0000062
  // myeloma cell
  species T in tme = 10;  // isVersionOf BTO:0000898

  // Parameters:
  // osteoclast growth rate
  ac = 3 unit_0;
  // osteoblast growth rate
  ab = 4 unit_0;
  // myeloma growth rate
  at = 1/sqrt(10); at has unit_0;
  // exponent
  gcc = 0 unit_1;  // isVersionOf ncit:C48923
  // exponent
  gbc = 1 unit_1;  // isVersionOf ncit:C48923
  // exponent
  gtc = 0 unit_1;  // isVersionOf ncit:C48923
  // exponent
  gcb = -0.5 unit_1;  // isVersionOf ncit:C48923
  // exponent
  gbb = 0 unit_1;  // isVersionOf ncit:C48923
  // exponent
  gtt = 0.5 unit_1;  // isVersionOf ncit:C48923
  // promotion coefficient of myeloma on osteoclast
  hct = 0 unit_1;  // isVersionOf ncit:C48922
  // inhibition coefficient of myeloma on osteoblast
  hbt = 0 unit_1;  // isVersionOf ncit:C48922
  // osteoclast death rate
  bc = 0.2 unit_0;  // isVersionOf ncit:C25636
  // osteoblast death rate
  bb = 0.02 unit_0;  // isVersionOf ncit:C25636
  // myeloma death rate
  bt = 0.1 unit_0;  // isVersionOf ncit:C25636
  // normalised osteoblast
  B_plot has unit_1;  // isVersionOf CL:0000062
  // normalised osteoclast
  C_plot has unit_1;  // isVersionOf CL:0000092
  T_plot has unit_1;  // isVersionOf BTO:0000898
  Initial_for_B = B;
  Initial_for_C = C;
  Initial_for_T = T;

  // Assignment rules:
  B_plot := B/Initial_for_B;
  C_plot := C*1.1/Initial_for_C;
  T_plot := T/Initial_for_T;

  // Reactions:
  osteoclast_growth: => C; tme*oc(ac, C, gcc, B, gcb, hct, T);  // modifiers: B, T; isVersionOf GO:0008283
  osteoblast_growth: => B; tme*ob(ab, C, gbc, B, gbb, hbt, T);  // modifiers: C, T; isVersionOf GO:0008283
  myeloma_growth: => T; tme*t(at, C, gtc, T, gtt);  // modifiers: C; isVersionOf GO:0008283
  osteoclast_death: C => ; tme*bc*C;  // isVersionOf GO:0008219
  osteoblast_death: B => ; tme*bb*B;  // isVersionOf GO:0008219
  myeloma_death: T => ; tme*bt*T;  // isVersionOf GO:0008219

  // Unit definitions:
  unit length = metre;
  unit area = metre^2;
  unit volume = 1e-3 litre;
  unit time = 86400 second;
  unit substance = 1e-3 mole;
  unit unit_0 = 1 / (8640 second); unit_0 is "1/d";
  unit unit_1 = dimensionless^0;
end
