// SBML level 2 version 4
// dcterms:bibliographicCitation: urn:miriam:pubmed:30389532

function Function_for_Susceptible_Logistic_Growth(r, S, N, K)
  r*S*(1 - N/K);
end

function Function_for_Chronic_Logistic_Growth(r_tilde, C, N, K)
  r_tilde*C*(1 - N/K);
end

function Function_for_Virus_Chronic_Release_From_Chronic_Infected(alpha, C)
  alpha*C;
end

model Gulbudak2019_2___Heterogeneous_viral_strategies_promote_coexistence_in_virus_microbe_systems__Chronic()
  // Gulbudak2019.2 - Heterogeneous viral strategies promote coexistence in virus-microbe systems (Chronic)
  // This is a mathematical model describing describing the population dynamics of microbes infected by chronically infecting viruses.
  // isDescribedBy pubmed:30389532
  // hasProperty GO:0019089
  // hasProperty mamo:MAMO_0000046
  // biomodels.db:MODEL1911100004 biomodels.db:BIOMD0000000846

  // Compartments:
  compartment compartment = 1;  // isVersionOf ncit:C16551

  // Species:
  species S in compartment = 830000000;  // hasVersion ncit:C14187
  species C in compartment = 0;  // hasProperty ncit:C14283; hasProperty ncit:C14141
  species V_C in compartment = 0.04*S;  // ncit:C14368

  // Parameters:
  r = 0.339;
  K = 894700000;
  beta = 20;
  eta = 1.5;
  mu = 0.0866;
  r_tilde = 0.2;
  phi_tilde = 5e-12;
  alpha = 0.1;

  // Assignment rules:
  d := 1/24;
  phi := 0.55*10^(-9.5);
  d_tilde := 1/20;
  N := S + C;

  // Reactions:
  Susceptible_Logistic_Growth: => S; compartment*Function_for_Susceptible_Logistic_Growth(r, S, N, K);  // ncit:C18081
  Susceptible_Absorption_Virus: S + V_C => C; compartment*phi_tilde*S*V_C;  // GO:0046718
  Susceptible_Death: S => ; compartment*d*S;  // GO:0008219
  Chronic_Infected_Death: C => ; compartment*d_tilde*C;  // GO:0008219
  Chronic_Infected_Logistic_Growth: => C; compartment*Function_for_Chronic_Logistic_Growth(r_tilde, C, N, K);  // GO:0044659
  Virus_Chronic_Release_From_Chronic_Infected: => V_C; compartment*Function_for_Virus_Chronic_Release_From_Chronic_Infected(alpha, C);  // modifiers: C; GO:0019076
  Virus_Chronic_Decay: V_C => ; compartment*mu*V_C;

  // Unit definitions:
  unit volume = 1e-3 litre;
  unit time = 3600 second;
  unit substance = item;
end
