// SBML level 2 version 4
// dcterms:bibliographicCitation: urn:miriam:pubmed:23098257

model Chitnis2012___Model_Rift_Valley_Fever_transmission_between_cattle_and_mosquitoes__Model_1()
  // Chitnis2012 - Model Rift Valley Fever transmission between cattle and mosquitoes (Model 1)
  // isDescribedBy pubmed:23098257
  // isVersionOf ncit:C17214
  // occursIn omit:0003748
  // hasProperty ncit:C128419 mamo:MAMO_0000046
  // biomodels.db:MODEL1805230002 biomodels.db:BIOMD0000000950

  // Compartments:
  compartment Cattle = 1;  // hasProperty omit:0003748
  compartment Vector = 1;  // hasProperty omit:0004757

  // Species:
  species $S_h in Cattle = piecewise(1000, Season_Dummy_Variable == 0, 1000);  // hasProperty ncit:C66819; hasProperty omit:0003748
  species $A_h in Cattle = 0;  // hasProperty ncit:C3833; hasProperty ncit:C128320
  species $I_h in Cattle = 0;  // hasProperty omit:0003748; hasProperty ido:0000460
  species $R_h in Cattle = 0;  // hasProperty omit:0003748; hasProperty ncit:C49498
  species $S_v in Vector = piecewise(19999, Season_Dummy_Variable == 0, 3999);  // hasProperty ncit:C66819; hasProperty omit:0004757
  species $E_v in Vector = 0;  // hasProperty omit:0003748; hasProperty PATO:0002425
  species $I_v in Vector = 1;  // hasProperty ido:0000460; hasProperty omit:0004757

  // Parameters:
  Season_Dummy_Variable = 0;

  // Assignment rules:
  u_h := piecewise(1/2190, Season_Dummy_Variable == 0, 1/2190);
  u_v := piecewise(1/20, Season_Dummy_Variable == 0, 1/14);
  psi_v := piecewise(0.1, Season_Dummy_Variable == 0, 0.1);
  theta_h := piecewise(0.4, Season_Dummy_Variable == 0, 0.4);
  sigma_v := piecewise(0.33, Season_Dummy_Variable == 0, 0.25);
  sigma_h := piecewise(19, Season_Dummy_Variable == 0, 19);
  beta_hv := piecewise(0.21, Season_Dummy_Variable == 0, 0.21);
  beta_vh := piecewise(0.7, Season_Dummy_Variable == 0, 0.7);
  v_v := piecewise(1/14, Season_Dummy_Variable == 0, 1/14);
  gamma_h := piecewise(1/4, Season_Dummy_Variable == 0, 1/4);
  gamma_tilde_h := piecewise(1/4, Season_Dummy_Variable == 0, 1/4);
  delta_h := piecewise(0.1, Season_Dummy_Variable == 0, 0.1);
  gamma_e := piecewise(0.2, Season_Dummy_Variable == 0, 0.1);
  M0 := piecewise(20000, Season_Dummy_Variable == 0, 4000);
  C0 := piecewise(1000, Season_Dummy_Variable == 0, 1000);
  N_v := S_v + E_v + I_v;
  N_h := S_h + I_h + A_h + R_h;
  lambda_h := sigma_v*N_v*sigma_h/(sigma_v*N_v + sigma_h*N_h)*beta_hv*(I_v/N_v);
  Total_Infected_Cattle := A_h + I_h;
  beta_tilde_vh := piecewise(0.3, Season_Dummy_Variable == 0, 0.3);
  lambda_v := sigma_v*sigma_h*N_h/(sigma_v*N_v + sigma_h*N_h)*(beta_vh*(I_h/N_h) + beta_tilde_vh*(A_h/N_h));

  // Rate rules:
  S_h' = u_h*C0 - lambda_h*S_h - u_h*S_h;
  A_h' = theta_h*lambda_h*S_h - (u_h + gamma_tilde_h)*A_h;
  I_h' = (1 - theta_h)*lambda_h*S_h - (u_h + gamma_h + delta_h)*I_h;
  R_h' = gamma_h*I_h + gamma_tilde_h*A_h - u_h*R_h;
  S_v' = (N_v - psi_v*I_v)/N_v*u_v*M0 - lambda_v*S_v - u_v*S_v;
  E_v' = lambda_v*S_v - (u_v + v_v)*E_v;
  I_v' = psi_v*I_v/N_v*u_v*M0 + v_v*E_v - u_v*I_v;

  // Unit definitions:
  unit volume = 1e-3 litre;
  unit substance = 1e-3 mole;
end
