// SBML level 3 version 1
// dcterms:bibliographicCitation: urn:miriam:pubmed:18950480

function Rate_Law_for_R1_3(k, substrate, parameter)
  k*substrate*parameter^2;
end

function Rate_Law_for_R3(k1a, Dw, Py1)
  k1a*Dw*Py1;
end

model Cui2008___in_vitro_transcriptional_response_of_zinc_homeostasis_system_in_Escherichia_coli()
  // Cui2008 - in vitro transcriptional response of zinc homeostasis system in Escherichia coli
  // BACKGROUND: The zinc homeostasis system in Escherichia coli is one of the most intensively studied prokaryotic zinc homeostasis systems. Its underlying regulatory machine consists of repression on zinc influx through ZnuABC by Zur (Zn2+ uptake regulator) and activation on zinc efflux via ZntA by ZntR (a zinc-responsive regulator). Although these transcriptional regulations seem to be well characterized, and there is an abundance of detailed in vitro experimental data available, as yet there is no mathematical model to help interpret these data. To our knowledge, the work described here is the first attempt to use a mathematical model to simulate these regulatory relations and to help explain the in vitro experimental data. RESULTS: We develop a unified mathematical model consisting of 14 reactions to simulate the in vitro transcriptional response of the zinc homeostasis system in E. coli. Firstly, we simulate the in vitro Zur-DNA interaction by using two of these reactions, which are expressed as 4 ordinary differential equations (ODEs). By imposing the conservation restraints and solving the relevant steady state equations, we find that the simulated sigmoidal curve matches the corresponding experimental data. Secondly, by numerically solving the ODEs for simulating the Zur and ZntR run-off transcription experiments, and depicting the simulated concentrations of zntA and znuC transcripts as a function of free zinc concentration, we find that the simulated curves fit the corresponding in vitro experimental data. Moreover, we also perform simulations, after taking into consideration the competitive effects of ZntR with the zinc buffer, and depict the simulated concentration of zntA transcripts as a function of the total ZntR concentration, both in the presence and absence of Zn(II). The obtained simulation results are in general agreement with the corresponding experimental data. CONCLUSION: Simulation results show that our model can quantitatively reproduce the results of several of the in vitro experiments conducted by Outten CE and her colleagues. Our model provides a detailed insight into the dynamics of the regulatory system and also provides a general framework for simulating in vitro metal-binding and transcription experiments and interpreting the relevant experimental data.
  // isDescribedBy pubmed:18950480
  // biomodels.db:MODEL1172501439
  // isVersionOf GO:0055069
  // isVersionOf mamo:MAMO_0000046
  // hasTaxon taxonomy:562
  // hasProperty ncit:C19077 mamo:MAMO_0000046
  // model units - substance: substance, time: time, volume: volume, area: area, length: length, extent: substance

  // Compartments:
  compartment Cell = 1 volume;  // hasProperty ncit:C48694

  // Species:
  // Zn2Zur Complex
  species Py in Cell = 25;  // hasInstance ncit:C19398 ncit:C948; hasInstance uniprot:P0AC51; hasProperty ncit:C19398
  // Zn4Zur Complex
  species Py1 in Cell = 0;  // hasInstance ncit:C19398 ncit:C948; hasInstance uniprot:P0AC51; isPartOf ncit:C19398
  // free znuC DNA
  species Dw in Cell = 4;  // isDerivedFrom ecogene:EG13132
  // RNA polymerase
  species Rw in Cell = 50;  // ncit:C20076
  // znuC transcription initiation complex
  species Qw1 in Cell = 0;  // isDerivedFrom ecogene:EG13132; hasInstance GO:0006352
  // Zn4Zur-DNA complex
  species Qw2 in Cell = 0;  // hasInstance ncit:C19398 uniprot:P0AC51; hasInstance ncit:C449; hasInstance ncit:C948; isPartOf ncit:C19398
  // Zinc 2+
  species Zn_2 in Cell = 1; Zn_2 is "Zn^2";  // CHEBI:29105

  // Parameters:
  r3 = 4.41e10 unit_0;
  r4 = 0.009 unit_1;
  k_1 = 0.9 unit_1;
  k2 = 0.02 unit_2;
  k_2 = 0.3 unit_1;
  Zn = 1e-5 unit_3;
  k1a = 1 unit_2;

  // Reactions:
  // Zn2Zur (Py) + Zn2+ -> Zn4Zur (Py1)
  Formation_of_the_Zn4Zur_complex: Py => Py1; Cell*Rate_Law_for_R1_3(r3, Py, Zn);  // hasProperty ncit:C82888
  // Zn4Zur (Py1) -> Zn2Zur (Py) + Zn2+
  Dissociation_of_Zn4Zur_complex: Py1 => Zn_2 + Py; Cell*r4*Py1;  // hasProperty ncit:C82888
  // free znuC DNA (Dw) + Zn4Zur (Py1) -> Zn4Zur-DNA complex (Qw2)
  Formation_of_DNA_binding_complex: Dw + Py1 => Qw2; Cell*Rate_Law_for_R3(k1a, Dw, Py1);  // hasProperty ncit:C82888
  Disassociation_of_DNA_binding_complex: Qw2 => Dw + Py1; Cell*k_1*Qw2;  // hasProperty ncit:C82888
  // Rna polymerase (Rw) binds to the free Znu DNA (Dw) to form the transcription initiation complex (Qw1)
  Formation_of_transcription_initiation_complex: Dw + Rw => Qw1; Cell*Rate_Law_for_R3(k2, Dw, Rw);  // hasProperty ncit:C82888
  // The transcription initiation complex (Qw1) disassociates to form Rna polymerase (Rw) binds to the free Znu DNA (Dw)
  Disassociation_of_transcription_initiation_complex: Qw1 => Dw + Rw; Cell*k_2*Qw1;  // hasProperty ncit:C82888

  // Unit definitions:
  unit length = metre;
  unit area = metre^2;
  unit volume = litre;
  unit time = 60 second;
  unit substance = 1e-9 mole;
  unit unit_0 = litre^2 / ((1e-9 mole)^2 * second); unit_0 is "(l)²/((nmol)²*s)";
  unit unit_1 = 1 / second; unit_1 is "1/s";
  unit unit_2 = litre / (1e-9 mole * second); unit_2 is "l/(nmol*s)";
  unit unit_3 = 1e-9 mole / litre; unit_3 is "nmol/l";
end
