// SBML level 3 version 1
// dcterms:bibliographicCitation: urn:miriam:pubmed:18445337

function Rate_Law_for_SOCS1production(K4, pSTAT5)
  K4*pSTAT5;
end

model Palmer2008_Negative_Feedback_in_IL_7_mediated_Jak_Stat_signaling()
  // Palmer2008 - Negative Feedback in IL-7 mediated Jak-Stat signaling
  // Interleukin-7 (IL-7) is an essential cytokine for the development and homeostatic maintenance of T and B lymphocytes. Binding of IL-7 to its cognate receptor, the IL-7 receptor (IL-7R), activates multiple pathways that regulate lymphocyte survival, glucose uptake, proliferation and differentiation. There has been much interest in understanding how IL-7 receptor signaling is modulated at multiple interconnected network levels. This review examines how the strength of the signal through the IL-7 receptor is modulated in T and B cells, including the use of shared receptor components, signaling crosstalk, shared interaction domains, feedback loops, integrated gene regulation, multimerization and ligand competition. We discuss how these network control mechanisms could integrate to govern the properties of IL-7R signaling in lymphocytes in health and disease. Analysis of IL-7 receptor signaling at a network level in a systematic manner will allow for a comprehensive approach to understanding the impact of multiple signaling pathways on lymphocyte biology.
  // isDescribedBy pubmed:18445337
  // ncit:C39128
  // occursIn BTO:0000775
  // hasTaxon taxonomy:9606
  // hasProperty GO:0050670 mamo:MAMO_0000046
  // biomodels.db:MODEL2010160001 biomodels.db:BIOMD0000000968
  // model units - substance: substance, time: time, volume: volume, area: area, length: length, extent: substance

  // Compartments:
  compartment cell = 1e-12 volume;

  // Species:
  species IL7 in cell = 1;  // uniprot:P13232
  species pJAK1 in cell = 0;  // hasProperty uniprot:P23458
  species STAT5 in cell = 2.490809;  // hasProperty uniprot:P51692; hasProperty uniprot:P42229
  species pSTAT5 in cell = 0;  // hasProperty uniprot:P42229; hasProperty uniprot:P51692
  species SOCS1 in cell = 0;  // hasProperty uniprot:O15524
  species IL7IL7RJAK1 in cell = 0;  // hasPart uniprot:P13232; hasPart uniprot:P16871; hasPart uniprot:P23458; hasPart uniprot:P31785
  species IL7RJAK1 in cell = 1.660539;  // hasProperty uniprot:P16871; hasProperty uniprot:P23458; hasProperty uniprot:P31785
  species IL7IL7RpJAK1 in cell = 0;  // hasPart uniprot:P13232; hasPart uniprot:P16871; hasPart uniprot:P23458; hasPart uniprot:P31785
  species IL7IL7RpJAK1STAT5 in cell = 0;  // hasProperty uniprot:P13232; hasProperty uniprot:P23458; hasProperty uniprot:P51692; hasProperty uniprot:P16871
  species IL7IL7RpJAK1SOCS1 in cell = 0;  // hasProperty uniprot:P16871; hasProperty uniprot:O15524; hasProperty uniprot:P13232; hasProperty uniprot:P23458

  // Parameters:
  Kf1 = 1;
  Kr1 = 0.1;
  K2 = 0.1;
  Kf3 = 1;
  Kr3 = 0.1;
  K3 = 1;
  K4 = 0.1;
  Kf5 = 1;
  K6 = 0.1;
  K7 = 0.1;

  // Assignment rules:
  RatiopSTAT5 := pSTAT5/(pSTAT5 + STAT5 + IL7IL7RpJAK1STAT5);

  // Reactions:
  IL7bindIL7RJAK1: IL7 + IL7RJAK1 -> IL7IL7RJAK1; cell*(Kf1*IL7*IL7RJAK1 - Kr1*IL7IL7RJAK1);
  JAK1phosphorylation: IL7IL7RJAK1 -> IL7IL7RpJAK1; cell*(K2*IL7IL7RJAK1 - K6*IL7IL7RpJAK1);
  STAT5bind: IL7IL7RpJAK1 + STAT5 -> IL7IL7RpJAK1STAT5; cell*(Kf3*IL7IL7RpJAK1*STAT5 - Kr3*IL7IL7RpJAK1STAT5);
  pSTAT5dephosph: pSTAT5 => STAT5; cell*K7*pSTAT5;
  SOCS1production: => SOCS1; cell*Rate_Law_for_SOCS1production(K4, pSTAT5);  // modifiers: pSTAT5
  SOCS1bind: IL7IL7RpJAK1 + SOCS1 => IL7IL7RpJAK1SOCS1; cell*Kf5*IL7IL7RpJAK1*SOCS1;
  STAT5phosph: IL7IL7RpJAK1STAT5 => IL7IL7RpJAK1 + pSTAT5; cell*K3*IL7IL7RpJAK1STAT5;

  // Unit definitions:
  unit length = metre;
  unit area = metre^2;
  unit volume = litre;
  unit time = 60 second;
  unit substance = 1e-9 mole;
end
