// SBML level 3 version 1
// dcterms:bibliographicCitation: urn:miriam:pubmed:32574303

function Rate_Law_for_reaction_1(beta, S, I, N)
  beta*S*I/N;
end

model Carcione2020___Deterministic_SEIR_simulation_of_a_COVID_19_outbreak()
  // Carcione2020 - Deterministic SEIR simulation of a COVID-19 outbreak
  // An epidemic disease caused by a new coronavirus has spread in Northern Italy with a strong contagion rate. We implement an SEIR model to compute the infected population and the number of casualties of this epidemic. The example may ideally regard the situation in the Italian Region of Lombardy, where the epidemic started on February 24, but by no means attempts to perform a rigorous case study in view of the lack of suitable data and the uncertainty of the different parameters, namely, the variation of the degree of home isolation and social distancing as a function of time, the initial number of exposed individuals and infected people, the incubation and infectious periods, and the fatality rate. First, we perform an analysis of the results of the model by varying the parameters and initial conditions (in order for the epidemic to start, there should be at least one exposed or one infectious human). Then, we consider the Lombardy case and calibrate the model with the number of dead individuals to date (May 5, 2020) and constrain the parameters on the basis of values reported in the literature. The peak occurs at day 37 (March 31) approximately, with a reproduction ratio R0 of 3 initially, 1.36 at day 22, and 0.8 after day 35, indicating different degrees of lockdown. The predicted death toll is approximately 15,600 casualties, with 2.7 million infected individuals at the end of the epidemic. The incubation period providing a better fit to the dead individuals is 4.25 days, and the infectious period is 4 days, with a fatality rate of 0.00144/day [values based on the reported (official) number of casualties]. The infection fatality rate (IFR) is 0.57%, and it is 2.37% if twice the reported number of casualties is assumed. However, these rates depend on the initial number of exposed individuals. If approximately nine times more individuals are exposed, there are three times more infected people at the end of the epidemic and IFR = 0.47%. If we relax these constraints and use a wider range of lower and upper bounds for the incubation and infectious periods, we observe that a higher incubation period (13 vs. 4.25 days) gives the same IFR (0.6 vs. 0.57%), but nine times more exposed individuals in the first case. Other choices of the set of parameters also provide a good fit to the data, but some of the results may not be realistic. Therefore, an accurate determination of the fatality rate and characteristics of the epidemic is subject to knowledge of the precise bounds of the parameters. Besides the specific example, the analysis proposed in this work shows how isolation measures, social distancing, and knowledge of the diffusion conditions help us to understand the dynamics of the epidemic. Hence, it is important to quantify the process to verify the effectiveness of the lockdown.
  // isDescribedBy pubmed:32574303
  // DOID:0080600
  // hasTaxon taxonomy:2697049 taxonomy:9606
  // hasProperty mamo:MAMO_0000028
  // biomodels.db:MODEL2011030005 biomodels.db:BIOMD0000000974
  // model units - substance: substance, time: time, volume: volume, area: area, length: length, extent: substance

  // Compartments:
  compartment City = 1 volume;  // ncit:C25160

  // Species:
  species Susceptible in City = Total_population - Exposed - Infected;  // ido:0000514; isVersionOf ncit:C171133
  species Exposed in City = 20000;  // isVersionOf ido:0000514; isVersionOf ncit:C171133; hasProperty ido:0000597
  species Infected in City = 1;  // ido:0000511; ncit:C171133
  species Recovered in City = 0;  // isVersionOf ncit:C171133; hasProperty ido:0000621
  species Deceased in City = 0;  // ncit:C28554; ncit:C168970
  species Total_population in City = 10000000;

  // Parameters:
  mu = 0.012048;
  beta = 0.833;
  epsilon = 0.33333;
  gamma = 0.125;
  alpha = 0.006;

  // Assignment rules:
  lambda := mu*Total_population;

  // Reactions:
  Susceptible_to_Exposed: Susceptible => Exposed; City*Rate_Law_for_reaction_1(beta, Susceptible, Infected, Total_population);  // modifiers: Infected, Total_population; ido:0000597; isVersionOf ncit:C171133
  Exposed_to_Infected: Exposed => Infected; City*epsilon*Exposed;  // ncit:C128320; isVersionOf ncit:C171133
  Infected_to_Recovered: Infected => Recovered; City*gamma*Infected;  // ncit:C25746
  Infected_to_Deceased: Infected => Deceased; City*alpha*Infected;  // ncit:C168970; ncit:C28554

  // Unit definitions:
  unit length = metre;
  unit area = metre^2;
  unit volume = 1e-3 litre;
  unit time = 86400 second;
  unit substance = item;
end
