// SBML level 2 version 4
// dcterms:bibliographicCitation: http://identifiers.org/biomodels.db/BIOMD0000000073 http://identifiers.org/pubmed/15363675 http://identifiers.org/biomodels.db/BIOMD0000000083 http://identifiers.org/biomodels.db/BIOMD0000000078 http://identifiers.org/biomodels.db/BIOMD0000000074
// dcterms:bibliographicCitation: http://identifiers.org/pubmed/15363675
// dcterms:bibliographicCitation: http://identifiers.org/pubmed/24005054

function Henri_Michaelis_Menten__irreversible__1(Kp, PCN_0, V3PC)
  V3PC*PCN_0/(Kp + PCN_0);
end
Henri_Michaelis_Menten__irreversible__1 is "Henri-Michaelis-Menten (irreversible)_1";

function Henri_Michaelis_Menten__irreversible__4(Kdp, PCCP_0, V2PC)
  V2PC*PCCP_0/(Kdp + PCCP_0);
end
Henri_Michaelis_Menten__irreversible__4 is "Henri-Michaelis-Menten (irreversible)_4";

function Henri_Michaelis_Menten__irreversible__2(Kdp, PCNP_0, V4PC)
  V4PC*PCNP_0/(Kdp + PCNP_0);
end
Henri_Michaelis_Menten__irreversible__2 is "Henri-Michaelis-Menten (irreversible)_2";

function Henri_Michaelis_Menten__irreversible__3(Kp, PCC_0, V1PC)
  V1PC*PCC_0/(Kp + PCC_0);
end
Henri_Michaelis_Menten__irreversible__3 is "Henri-Michaelis-Menten (irreversible)_3";

function Hill__Copy__1(BN_0, KAC, n, vsC)
  vsC*BN_0^n/(KAC^n + BN_0^n);
end
Hill__Copy__1 is "Hill (Copy)_1";

function Hill__copy__1__1(BN_0, KIB, m, vsB)
  vsB*KIB^m/(KIB^m + BN_0^m);
end
Hill__copy__1__1 is "Hill (copy, 1)_1";

function Henri_Michaelis_Menten__irreversible__9(BC_0, Kp, V1B)
  V1B*BC_0/(Kp + BC_0);
end
Henri_Michaelis_Menten__irreversible__9 is "Henri-Michaelis-Menten (irreversible)_9";

function Rate_Law_for_Translation_of_mRNA_to_protein_1(MC_0, ksC)
  ksC*MC_0;
end

function Henri_Michaelis_Menten__irreversible__11(BN_0, Kp, V3B)
  V3B*BN_0/(Kp + BN_0);
end
Henri_Michaelis_Menten__irreversible__11 is "Henri-Michaelis-Menten (irreversible)_11";

function Henri_Michaelis_Menten__irreversible__12(BNP_0, Kdp, V4B)
  V4B*BNP_0/(Kdp + BNP_0);
end
Henri_Michaelis_Menten__irreversible__12 is "Henri-Michaelis-Menten (irreversible)_12";

function Henri_Michaelis_Menten__irreversible__14(KmC, MC_0, vmC)
  vmC*MC_0/(KmC + MC_0);
end
Henri_Michaelis_Menten__irreversible__14 is "Henri-Michaelis-Menten (irreversible)_14";

function Henri_Michaelis_Menten__irreversible__15(CCP_0, Kd, vdCC)
  vdCC*CCP_0/(Kd + CCP_0);
end
Henri_Michaelis_Menten__irreversible__15 is "Henri-Michaelis-Menten (irreversible)_15";

function Henri_Michaelis_Menten__irreversible__18(KmP, MP_0, vmP)
  vmP*MP_0/(KmP + MP_0);
end
Henri_Michaelis_Menten__irreversible__18 is "Henri-Michaelis-Menten (irreversible)_18";

function Henri_Michaelis_Menten__irreversible__20(KmB, MB_0, vmB)
  vmB*MB_0/(KmB + MB_0);
end
Henri_Michaelis_Menten__irreversible__20 is "Henri-Michaelis-Menten (irreversible)_20";

function Henri_Michaelis_Menten__irreversible__21(BCP_0, Kd, vdBC)
  vdBC*BCP_0/(Kd + BCP_0);
end
Henri_Michaelis_Menten__irreversible__21 is "Henri-Michaelis-Menten (irreversible)_21";

function Henri_Michaelis_Menten__irreversible__22(BNP_0, Kd, vdBN)
  vdBN*BNP_0/(Kd + BNP_0);
end
Henri_Michaelis_Menten__irreversible__22 is "Henri-Michaelis-Menten (irreversible)_22";

function Henri_Michaelis_Menten__irreversible__7(Kp, PC_0, V1P)
  V1P*PC_0/(Kp + PC_0);
end
Henri_Michaelis_Menten__irreversible__7 is "Henri-Michaelis-Menten (irreversible)_7";

function Henri_Michaelis_Menten__irreversible__17(Kd, PCNP_0, vdPCN)
  vdPCN*PCNP_0/(Kd + PCNP_0);
end
Henri_Michaelis_Menten__irreversible__17 is "Henri-Michaelis-Menten (irreversible)_17";

function Henri_Michaelis_Menten__irreversible__19(Kd, PCP_0, vdPC)
  vdPC*PCP_0/(Kd + PCP_0);
end
Henri_Michaelis_Menten__irreversible__19 is "Henri-Michaelis-Menten (irreversible)_19";

function Henri_Michaelis_Menten__irreversible__13(IN_0, Kd, vdIN)
  vdIN*IN_0/(Kd + IN_0);
end
Henri_Michaelis_Menten__irreversible__13 is "Henri-Michaelis-Menten (irreversible)_13";

function Henri_Michaelis_Menten__irreversible__8(Kdp, PCP_0, V2P)
  V2P*PCP_0/(Kdp + PCP_0);
end
Henri_Michaelis_Menten__irreversible__8 is "Henri-Michaelis-Menten (irreversible)_8";

function Henri_Michaelis_Menten__irreversible__10(BCP_0, Kdp, V2B)
  V2B*BCP_0/(Kdp + BCP_0);
end
Henri_Michaelis_Menten__irreversible__10 is "Henri-Michaelis-Menten (irreversible)_10";

function Henri_Michaelis_Menten__irreversible__16(Kd, PCCP_0, vdPCC)
  vdPCC*PCCP_0/(Kd + PCCP_0);
end
Henri_Michaelis_Menten__irreversible__16 is "Henri-Michaelis-Menten (irreversible)_16";

function Henri_Michaelis_Menten__irreversible__5(CC_0, Kp, V1C)
  V1C*CC_0/(Kp + CC_0);
end
Henri_Michaelis_Menten__irreversible__5 is "Henri-Michaelis-Menten (irreversible)_5";

function Rate_Law_for_Translation_of_mRNA_to_protein_2(MP_0, ksP)
  ksP*MP_0;
end

function Henri_Michaelis_Menten__irreversible__6(CCP_0, Kdp, V2C)
  V2C*CCP_0/(Kdp + CCP_0);
end
Henri_Michaelis_Menten__irreversible__6 is "Henri-Michaelis-Menten (irreversible)_6";

function Hill__Copy__2(BN_0, KAP, n, vsP)
  vsP*BN_0^n/(KAP^n + BN_0^n);
end
Hill__Copy__2 is "Hill (Copy)_2";

function Rate_Law_for_Translation_of_mRNA_to_protein_3(MB_0, ksB)
  ksB*MB_0;
end

model Leloup2004___Mammalian_Circadian_Rhythm_models_for_23_8_and_24_2_hours_timeperiod()
  // Leloup2004 - Mammalian Circadian Rhythm models for 23.8 and 24.2 hours timeperiod
  // We extend the study of a computational model recently proposed for the mammalian circadian clock (Proc. Natl Acad. Sci. USA 100 (2003) 7051). The model, based on the intertwined positive and negative regulatory loops involving the Per, Cry, Bmal1, and Clock genes, can give rise to sustained circadian oscillations in conditions of continuous darkness. These limit cycle oscillations correspond to circadian rhythms autonomously generated by suprachiasmatic nuclei and by some peripheral tissues. By using different sets of parameter values producing circadian oscillations, we compare the effect of the various parameters and show that both the occurrence and the period of the oscillations are generally most sensitive to parameters related to synthesis or degradation of Bmal1 mRNA and BMAL1 protein. The mechanism of circadian oscillations relies on the formation of an inactive complex between PER and CRY and the activators CLOCK and BMAL1 that enhance Per and Cry expression. Bifurcation diagrams and computer simulations nevertheless indicate the possible existence of a second source of oscillatory behavior. Thus, sustained oscillations might arise from the sole negative autoregulation of Bmal1 expression. This second oscillatory mechanism may not be functional in physiological conditions, and its period need not necessarily be circadian. When incorporating the light-induced expression of the Per gene, the model accounts for entrainment of the oscillations by light-dark (LD) cycles. Long-term suppression of circadian oscillations by a single light pulse can occur in the model when a stable steady state coexists with a stable limit cycle. The phase of the oscillations upon entrainment in LD critically depends on the parameters that govern the level of CRY protein. Small changes in the parameters governing CRY levels can shift the peak in Per mRNA from the L to the D phase, or can prevent entrainment. The results are discussed in relation to physiological disorders of the sleep-wake cycle linked to perturbations of the human circadian clock, such as the familial advanced sleep phase syndrome or the non-24h sleep-wake syndrome.
  // isDerivedFrom biomodels.db:MODEL0478895291 GO:0043153 taxonomy:9606 biomodels.db:BIOMD0000000083
  // isDerivedFrom biomodels.db:BIOMD0000000078
  // isDerivedFrom biomodels.db:BIOMD0000000074
  // isDerivedFrom biomodels.db:BIOMD0000000073
  // isDescribedBy biomodels.db:BIOMD0000000083 biomodels.db:BIOMD0000000078 biomodels.db:BIOMD0000000074 biomodels.db:BIOMD0000000073 pubmed:15363675
  // biomodels.db:MODEL0478895291

  // Compartments:
  // This compartment describes Circadian Rhythms occuring at 24.2 hours.
  compartment Compartment = 1; Compartment is "Mammalian Cell";  // ncit:C12958; isDescribedBy pubmed:15363675

  // Species:
  species MP_0 in Compartment = 0;  // isEncodedBy ensembl:ENST00000317276; isDescribedBy pubmed:24005054
  species MC_0 in Compartment = 0;  // isEncodedBy ensembl:ENST00000008527
  species MB_0 in Compartment = 8.6;  // isEncodedBy ensembl:ENST00000403290
  species PC_0 in Compartment = 1;  // uniprot:O15534
  species CC_0 in Compartment = 1;  // uniprot:Q16526
  species PCP_0 in Compartment = 1;  // isVersionOf uniprot:O15534; hasProperty PATO:0002220; hasProperty PATO:0002220
  species CCP_0 in Compartment = 1;  // isVersionOf uniprot:Q16526; hasProperty PATO:0002220; hasProperty PATO:0002220
  species PCC_0 in Compartment = 1;  // GO:1990512; hasInstance GO:1990512 uniprot:Q16526; hasInstance uniprot:O15534
  species PCN_0 in Compartment = 1;  // GO:1990512; hasInstance GO:1990512 uniprot:Q16526; hasInstance uniprot:O15534
  species PCNP_0 in Compartment = 1;  // isVersionOf GO:1990512; hasProperty PATO:0002220; hasProperty PATO:0002220; hasInstance GO:1990512 PATO:0002220 uniprot:Q16526
  species PCCP_0 in Compartment = 1;  // isVersionOf GO:1990512; hasProperty PATO:0002220; hasProperty PATO:0002220; hasInstance GO:1990512 PATO:0002220 uniprot:O15534
  species BC_0 in Compartment = 1;  // uniprot:O00327
  species BCP_0 in Compartment = 1;  // isVersionOf uniprot:O00327; hasProperty PATO:0002220; hasProperty PATO:0002220
  species BN_0 in Compartment = 1;  // uniprot:O00327
  species BNP_0 in Compartment = 1;  // isVersionOf uniprot:O00327; hasProperty PATO:0002220; hasProperty PATO:0002220
  species IN_0 in Compartment = 1;  // hasPart GO:1990513; hasPart GO:1990512
  species $BTot in Compartment;  // ncit:C25697
  species $CTot in Compartment;  // ncit:C25697
  species $PTot in Compartment;  // ncit:C25697

  // Parameters:
  MP = 0 unit_0;  // isEncodedBy ensembl:ENST00000317276
  vsP has unit_1;  // ncit:C47822
  vmP = 1.1 unit_1;  // ncit:C47822
  kdmp = 0.01 unit_2;  // ncit:C94967
  KAP = 0.7 unit_0;
  KmP = 0.31 unit_0;
  MC = 0 unit_0;  // isEncodedBy ensembl:ENST00000008527
  vsC has unit_1;  // ncit:C47822
  vmC = 1 unit_1;  // ncit:C47822
  kdmc = 0.01 unit_2;  // ncit:C94967
  KAC = 0.6 unit_0;
  KmC = 0.4 unit_0;
  MB = 8.6 unit_0;  // isEncodedBy ensembl:ENST00000403290
  vsB has unit_1;  // ncit:C47822
  vmB = 0.8 unit_1;  // ncit:C47822
  kdmb = 0.01 unit_2;  // ncit:C94967
  KIB = 2.2 unit_0;
  KmB = 0.4 unit_0;
  PC = 1 unit_0;  // uniprot:O15534
  CC = 1 unit_0;  // uniprot:Q16526
  PCP = 1 unit_0;  // isVersionOf uniprot:O15534; hasProperty PATO:0002220; hasProperty PATO:0002220
  CCP = 1 unit_0;  // isVersionOf uniprot:Q16526; hasProperty PATO:0002220; hasProperty PATO:0002220
  PCC = 1 unit_0;  // GO:1990512; hasInstance GO:1990512 uniprot:O15534; hasInstance uniprot:Q16526
  PCN = 1 unit_0;  // GO:1990512; hasInstance GO:1990512 uniprot:O15534; hasInstance uniprot:Q16526
  PCCP = 1 unit_0;  // isVersionOf GO:1990512; hasProperty PATO:0002220; hasProperty PATO:0002220; hasInstance GO:1990512 PATO:0002220 uniprot:O15534
  PCNP = 1 unit_0;  // isVersionOf GO:1990512; hasProperty PATO:0002220; hasProperty PATO:0002220; hasInstance GO:1990512 PATO:0002220 uniprot:Q16526
  BC = 1 unit_0;  // uniprot:O00327
  BCP = 1 unit_0;  // isVersionOf uniprot:O00327; hasProperty PATO:0002220; hasProperty PATO:0002220
  BN = 1 unit_0;  // uniprot:O00327
  BNP = 1 unit_0;  // isVersionOf uniprot:O00327; hasProperty PATO:0002220; hasProperty PATO:0002220
  IN = 1 unit_0;  // hasPart GO:1990513; hasPart GO:1990512
  // Rate constant for entry of the PER–CRY complex into the nucleus
  k1 = 0.4 unit_2;  // ncit:C94967
  // Rate constant for exit of the PER–CRY complex from the nucleus
  k2 = 0.2 unit_2;  // ncit:C94967
  // Rate constant for the formation of the PER–CRY complex
  k3 = 0.4 unit_3;  // ncit:C94967
  k4 = 0.2 unit_2;  // ncit:C94967
  k5 = 0.4 unit_2;  // ncit:C94967
  k6 = 0.2 unit_2;  // ncit:C94967
  k7 = 0.5 unit_3;  // ncit:C94967
  k8 = 0.1 unit_2;  // ncit:C94967
  kdnc = 0.12 unit_2;  // ncit:C94967
  kdn = 0.01 unit_2;  // ncit:C94967
  kstot = 1 unit_2;  // ncit:C94967
  ksB has unit_2;  // ncit:C94967
  ksC has unit_2;  // ncit:C94967
  ksP has unit_2;  // ncit:C94967
  m = 2 unit_4;
  n = 4 unit_4;
  vstot = 1 unit_1;  // ncit:C47822
  Kd = 0.3 unit_0;
  Kdp = 0.1 unit_0;
  Kp = 0.1 unit_0;
  Vphos = 0.4 unit_1;
  V1B = 0.5 unit_1;  // ncit:C47822
  V1C = 0.6 unit_1;  // ncit:C47822
  V1P has unit_1;  // ncit:C47822
  V1PC has unit_1;  // ncit:C47822
  V2B = 0.1 unit_1;  // ncit:C47822
  V2C = 0.1 unit_1;  // ncit:C47822
  V2P = 0.3 unit_1;  // ncit:C47822
  V2PC = 0.1 unit_1;  // ncit:C47822
  V3B = 0.5 unit_1;  // ncit:C47822
  V3PC has unit_1;  // ncit:C47822
  V4B = 0.2 unit_1;  // ncit:C47822
  V4PC = 0.1 unit_1;  // ncit:C47822
  vdBC = 0.5 unit_1;  // ncit:C47822
  vdBN = 0.6 unit_1;  // ncit:C47822
  vdCC = 0.7 unit_1;  // ncit:C47822
  vdIN = 0.8 unit_1;  // ncit:C47822
  vdPC = 0.7 unit_1;  // ncit:C47822
  vdPCC = 0.7 unit_1;  // ncit:C47822
  vdPCN = 0.7 unit_1;  // ncit:C47822

  // Assignment rules:
  vsB := vstot;
  vsC := 1.1*vstot;
  vsP := 1.5*vstot;
  CTot := CC + CCP;
  BTot := BN + BC;
  PTot := PC + PCCP + PCC + PCNP + PCN + PCP;
  ksP := 0.6*kstot;
  ksB := 0.12*kstot;
  V1P := Vphos;
  ksC := 1.6*kstot;
  V1PC := Vphos;
  V3PC := Vphos;

  // Rate rules:
  MP' = vsP*(BN^n/(KAP^n + BN^n)) - (vmP*(MP/(KmP + MP)) + kdmp*MP);
  MC' = vsC*(BN^n/(KAC^n + BN^n)) - (vmC*(MC/(KmC + MC)) + kdmc*MC);
  MB' = vsB*(KIB^m/(KIB^m + BN^m)) - (vmB*(MB/(KmB + MB)) + kdmb*MB);
  PC' = ksP*MP + V2P*(PCP/(Kdp + PCP)) + k4*PCC - (V1P*(PC/(Kp + PC)) + k3*PC*CC + kdn*PC);
  CC' = ksC*MC + V2C*(CCP/(Kdp + CCP)) + k4*PCC - (V1C*(CC/(Kp + CC)) + k3*PC*CC + kdnc*CC);
  PCP' = V1P*(PC/(Kp + PC)) - (V2P*(PCP/(Kdp + PCP)) + vdPC*(PCP/(Kd + PCP)) + kdn*PCP);
  CCP' = V1C*(CC/(Kp + CC)) - (V2C*(CCP/(Kdp + CCP)) + vdCC*(CCP/(Kd + CCP)) + kdn*CCP);
  PCC' = V2PC*(PCCP/(Kdp + PCCP)) + k3*PC*CC + k2*PCN - (V1PC*(PCC/(Kp + PCC)) + k4*PCC + k1*PCC + kdn*PCC);
  PCN' = V4PC*(PCNP/(Kdp + PCNP)) + k1*PCC + k8*IN - (V3PC*(PCN/(Kp + PCN)) + k2*PCN + k7*BN*PCN + kdn*PCN);
  PCCP' = V1PC*(PCC/(Kp + PCC)) - (V2PC*(PCCP/(Kdp + PCCP)) + vdPCC*(PCCP/(Kd + PCCP)) + kdn*PCCP);
  PCNP' = V3PC*(PCN/(Kp + PCN)) - (V4PC*(PCNP/(Kdp + PCNP)) + vdPCN*(PCNP/(Kd + PCNP)) + kdn*PCNP);
  BC' = V2B*(BCP/(Kdp + BCP)) + k6*BN + ksB*MB - (V1B*(BC/(Kp + BC)) + k5*BC + kdn*BC);
  BCP' = V1B*(BC/(Kp + BC)) - (V2B*(BCP/(Kdp + BCP)) + vdBC*(BCP/(Kd + BCP)) + kdn*BCP);
  BN' = V4B*(BNP/(Kdp + BNP)) + k5*BC + k8*IN - (V3B*(BN/(Kp + BN)) + k6*BN + k7*BN*PCN + kdn*BN);
  BNP' = V3B*(BN/(Kp + BN)) - (V4B*(BNP/(Kdp + BNP)) + vdBN*(BNP/(Kd + BNP)) + kdn*BNP);
  IN' = k7*BN*PCN - (k8*IN + vdIN*(IN/(Kd + IN)) + kdn*IN);

  // Reactions:
  Reversible_reaction__between_PER_CRY_complex_in_cytosol_and_nucleus: PCC_0 -> PCN_0; Compartment*(k1*PCC_0 - k2*PCN_0); Reversible_reaction__between_PER_CRY_complex_in_cytosol_and_nucleus is "Reversible reaction between PER-CRY complex in cytosol and nucleus";
  Phosphorylation_of_PER_CRY_complex_in_nucleus: PCN_0 => PCNP_0; Compartment*Henri_Michaelis_Menten__irreversible__1(Kp, PCN_0, V3PC); Phosphorylation_of_PER_CRY_complex_in_nucleus is "Phosphorylation of PER-CRY complex in nucleus";
  Dephosphorylation_of_PER_CRY_complex_in_nucleus: PCNP_0 => PCN_0; Compartment*Henri_Michaelis_Menten__irreversible__2(Kdp, PCNP_0, V4PC); Dephosphorylation_of_PER_CRY_complex_in_nucleus is "Dephosphorylation of PER-CRY complex in nucleus";
  Phosphorylation_of_PER_CRY_complex_in_cytosol: PCC_0 => PCCP_0; Compartment*Henri_Michaelis_Menten__irreversible__3(Kp, PCC_0, V1PC); Phosphorylation_of_PER_CRY_complex_in_cytosol is "Phosphorylation of PER-CRY complex in cytosol";
  Dephosphorylation_of_PER_CRY_complex_in_cytosol: PCCP_0 => PCC_0; Compartment*Henri_Michaelis_Menten__irreversible__4(Kdp, PCCP_0, V2PC); Dephosphorylation_of_PER_CRY_complex_in_cytosol is "Dephosphorylation of PER-CRY complex in cytosol";  // ncit:C20612
  Reversible_reaction_between_PER__CRY_and_PER_CRY_complex_in_cytosol: CC_0 + PC_0 -> PCC_0; Compartment*(k3*CC_0*PC_0 - k4*PCC_0); Reversible_reaction_between_PER__CRY_and_PER_CRY_complex_in_cytosol is "Reversible reaction between PER, CRY and PER-CRY complex in cytosol";
  Phosphorylation_of_CRY_in_cytosol: CC_0 => CCP_0; Compartment*Henri_Michaelis_Menten__irreversible__5(CC_0, Kp, V1C);
  Dephosphorylation_of_CRY_in_cytosol: CCP_0 => CC_0; Compartment*Henri_Michaelis_Menten__irreversible__6(CCP_0, Kdp, V2C);  // ncit:C20612
  Translation_of_Cry_mRNA_to_CRY_protein_in_cytosol: => CC_0; Compartment*Rate_Law_for_Translation_of_mRNA_to_protein_1(MC_0, ksC);  // modifiers: MC_0; ncit:C80450
  Transcription_of_Cry_gene_to_Cry_mRNA: => MC_0; Compartment*Hill__Copy__1(BN_0, KAC, n, vsC);  // modifiers: BN_0; ncit:C17208
  Transcription_of_Per_gene_to_Per_mRNA: => MP_0; Compartment*Hill__Copy__2(BN_0, KAP, n, vsP);  // modifiers: BN_0; ncit:C17208
  Translation_of_Per_mRNA_to_PER_protein: => PC_0; Compartment*Rate_Law_for_Translation_of_mRNA_to_protein_2(MP_0, ksP);  // modifiers: MP_0; ncit:C80450
  Phosphorylation_of_PER_in_cytosol: PC_0 => PCP_0; Compartment*Henri_Michaelis_Menten__irreversible__7(Kp, PC_0, V1P);
  Dephosphorylation_of_PER_in_cytosol: PCP_0 => PC_0; Compartment*Henri_Michaelis_Menten__irreversible__8(Kdp, PCP_0, V2P);  // ncit:C20612
  Transcription_of_Bmal1_gene_to_Bmal1_mRNA: => MB_0; Compartment*Hill__copy__1__1(BN_0, KIB, m, vsB);  // modifiers: BN_0; ncit:C17208
  Translation_of_Bmal1_mRNA_to_BMAL1_protein: => BC_0; Compartment*Rate_Law_for_Translation_of_mRNA_to_protein_3(MB_0, ksB);  // modifiers: MB_0; ncit:C80450
  Phosphorylation_of_BMAL1_in_cytosol: BC_0 => BCP_0; Compartment*Henri_Michaelis_Menten__irreversible__9(BC_0, Kp, V1B);
  Dephosphorylation_of_BMAL1_in_cytosol: BCP_0 => BC_0; Compartment*Henri_Michaelis_Menten__irreversible__10(BCP_0, Kdp, V2B);  // ncit:C20612
  Reversible_reation_between_BMAL1_in_cytosol_and_nucleus: BC_0 -> BN_0; Compartment*(k5*BC_0 - k6*BN_0);
  Phosphorylation_of_BMAL1_in_nucleus: BN_0 => BNP_0; Compartment*Henri_Michaelis_Menten__irreversible__11(BN_0, Kp, V3B);
  Dephosphorylation_of_BMAL1_in_nucleus: BNP_0 => BN_0; Compartment*Henri_Michaelis_Menten__irreversible__12(BNP_0, Kdp, V4B);  // ncit:C20612
  Reversible_reaction_between_PER_CRY_complex_and_PER_CRY_CLOCK_BMAL1_in_nuclues: PCN_0 + BN_0 -> IN_0; Compartment*(k7*PCN_0*BN_0 - k8*IN_0); Reversible_reaction_between_PER_CRY_complex_and_PER_CRY_CLOCK_BMAL1_in_nuclues is "Reversible reaction between PER-CRY complex and PER-CRY-CLOCK-BMAL1 in nuclues";
  Degradation_of_the_PER_CRY_CLOCK_BMAL1_complex: IN_0 => ; Compartment*Henri_Michaelis_Menten__irreversible__13(IN_0, Kd, vdIN); Degradation_of_the_PER_CRY_CLOCK_BMAL1_complex is "Degradation of the PER-CRY-CLOCK-BMAL1 complex";  // ncit:C61559
  Degradation_of_Cry_mRNA: MC_0 => ; Compartment*Henri_Michaelis_Menten__irreversible__14(KmC, MC_0, vmC);  // ncit:C61559
  Degradation_of_CRY_P_protein_in_cytosol: CCP_0 => ; Compartment*Henri_Michaelis_Menten__irreversible__15(CCP_0, Kd, vdCC); Degradation_of_CRY_P_protein_in_cytosol is "Degradation of CRY-P protein in cytosol";  // ncit:C61559
  Non_specific_degradation_of_Cry_mRNA: MC_0 => ; Compartment*kdmc*MC_0; Non_specific_degradation_of_Cry_mRNA is "Non-specific degradation of Cry mRNA";  // ncit:C61559
  Degradation_of_PER_CRY_complex_in_cytosol: PCCP_0 => ; Compartment*Henri_Michaelis_Menten__irreversible__16(Kd, PCCP_0, vdPCC); Degradation_of_PER_CRY_complex_in_cytosol is "Degradation of PER-CRY complex in cytosol";  // ncit:C61559
  Degradation_of_PER_CRY_complex_in_nucleus: PCNP_0 => ; Compartment*Henri_Michaelis_Menten__irreversible__17(Kd, PCNP_0, vdPCN); Degradation_of_PER_CRY_complex_in_nucleus is "Degradation of PER-CRY complex in nucleus";  // ncit:C61559
  Degradation_of_Per_mRNA: MP_0 => ; Compartment*Henri_Michaelis_Menten__irreversible__18(KmP, MP_0, vmP);  // ncit:C61559
  Degradation_of_PER_P_in_cytosol: PCP_0 => ; Compartment*Henri_Michaelis_Menten__irreversible__19(Kd, PCP_0, vdPC); Degradation_of_PER_P_in_cytosol is "Degradation of PER-P in cytosol";  // ncit:C61559
  Non_specific_degradation_of_Per_mRNA: MP_0 => ; Compartment*kdmp*MP_0; Non_specific_degradation_of_Per_mRNA is "Non-specific degradation of Per mRNA";  // ncit:C61559
  Degradation_of_Bmal1_mRNA: MB_0 => ; Compartment*Henri_Michaelis_Menten__irreversible__20(KmB, MB_0, vmB);  // ncit:C61559
  Non_specific_degradation_of_Bmal1_mRNA: MB_0 => ; Compartment*kdmb*MB_0; Non_specific_degradation_of_Bmal1_mRNA is "Non-specific degradation of Bmal1 mRNA";  // ncit:C61559
  Degradation_of_BMAL1_P_in_cytosol: BCP_0 => ; Compartment*Henri_Michaelis_Menten__irreversible__21(BCP_0, Kd, vdBC); Degradation_of_BMAL1_P_in_cytosol is "Degradation of BMAL1-P in cytosol";  // ncit:C61559
  Degradation_of_BMAL1_P_in_nucleus: BNP_0 => ; Compartment*Henri_Michaelis_Menten__irreversible__22(BNP_0, Kd, vdBN); Degradation_of_BMAL1_P_in_nucleus is "Degradation of BMAL1-P in nucleus";  // ncit:C61559
  Non_specific_degradation_of_PER_protein_in_cytosol: PC_0 => ; Compartment*kdn*PC_0; Non_specific_degradation_of_PER_protein_in_cytosol is "Non-specific degradation of PER protein in cytosol";  // ncit:C61559
  Non_specific_degradation_of_CRY_protein_in_cytosol: CC_0 => ; Compartment*kdnc*CC_0; Non_specific_degradation_of_CRY_protein_in_cytosol is "Non-specific degradation of CRY protein in cytosol";  // ncit:C61559
  Non_specific_degradation_of_PER_P_protein_in_cytosol: PCP_0 => ; Compartment*kdn*PCP_0; Non_specific_degradation_of_PER_P_protein_in_cytosol is "Non-specific degradation of PER-P protein in cytosol";  // ncit:C61559
  Non_specific_degradation_of_CRY_P_protein_in_cytosol: CCP_0 => ; Compartment*kdn*CCP_0; Non_specific_degradation_of_CRY_P_protein_in_cytosol is "Non-specific degradation of CRY-P protein in cytosol";  // ncit:C61559
  Non_specific_degradation_of_PER_CRY_protein_complex_in_cytosol: PCC_0 => ; Compartment*kdn*PCC_0; Non_specific_degradation_of_PER_CRY_protein_complex_in_cytosol is "Non-specific degradation of PER-CRY protein complex in cytosol";  // ncit:C61559
  Non_specific_degradation_of_PER_CRY_protein_complex_in_nucleus: PCN_0 => ; Compartment*kdn*PCN_0; Non_specific_degradation_of_PER_CRY_protein_complex_in_nucleus is "Non-specific degradation of PER-CRY protein complex in nucleus";  // ncit:C61559
  Non_specific_degradation_of_PER_CRY_P_protein_complex_in_cytosol: PCCP_0 => ; Compartment*kdn*PCCP_0; Non_specific_degradation_of_PER_CRY_P_protein_complex_in_cytosol is "Non-specific degradation of PER-CRY-P protein complex in cytosol";  // ncit:C61559
  Non_specific_degradation_of_PER_CRY_P_protein_complex_in_nucleus: PCNP_0 => ; Compartment*kdn*PCNP_0; Non_specific_degradation_of_PER_CRY_P_protein_complex_in_nucleus is "Non-specific degradation of PER-CRY-P protein complex in nucleus";  // ncit:C61559
  Non_specific_degradation_of_BMAL1_protein_in_cytosol: BC_0 => ; Compartment*kdn*BC_0; Non_specific_degradation_of_BMAL1_protein_in_cytosol is "Non-specific degradation of BMAL1 protein in cytosol";  // ncit:C61559
  Non_specific_degradation_of_BMAL1_P_protein_in_cytosol: BCP_0 => ; Compartment*kdn*BCP_0; Non_specific_degradation_of_BMAL1_P_protein_in_cytosol is "Non-specific degradation of BMAL1-P protein in cytosol";  // ncit:C61559
  Non_specific_degradation_of_BMAL1_protein_in_nucleus: BN_0 => ; Compartment*kdn*BN_0; Non_specific_degradation_of_BMAL1_protein_in_nucleus is "Non-specific degradation of BMAL1 protein in nucleus";  // ncit:C61559
  Non_specific_degradation_of_BMAL1_P_protein_in_nucleus: BNP_0 => ; Compartment*kdn*BNP_0; Non_specific_degradation_of_BMAL1_P_protein_in_nucleus is "Non-specific degradation of BMAL1-P protein in nucleus";  // ncit:C61559
  Non_specific_degradation_of_PER_CRY_BMAL1_CLOCK_complex_in_nucleus: IN_0 => ; Compartment*kdn*IN_0; Non_specific_degradation_of_PER_CRY_BMAL1_CLOCK_complex_in_nucleus is "Non-specific degradation of PER-CRY-BMAL1-CLOCK complex in nucleus";  // ncit:C61559

  // Unit definitions:
  unit length = metre;
  unit area = metre^2;
  unit volume = litre;
  unit time = 3600 second;
  unit substance = 1e-9 mole;
  unit unit_0 = 1e-9 mole / litre; unit_0 is "nmol/l";
  unit unit_1 = 1e-3 mole / (litre * second); unit_1 is "mmol/(l*s)";
  unit unit_2 = 1 / (1e-3 second); unit_2 is "1/ms";
  unit unit_3 = 1e-3 litre / (mole * second); unit_3 is "ml/(mol*s)";
  unit unit_4 = dimensionless^0; unit_4 is "1";
end
