// SBML level 3 version 1
// dcterms:bibliographicCitation: urn:miriam:pubmed:32831142

function Rate_Law_for_reaction(beta, c_t, I, xi, A, S, N)
  beta*c_t*(I + xi*A)*S/N;
end

function Rate_Law_for_reaction_4(theta, phi, E)
  (1 - theta)*phi*E;
end

function Rate_Law_for_reaction_5(q_3, q_2, I, eta, Q, E, N)
  q_3*(q_2*I + eta*Q)*E/N;
end

function Rate_Law_for_reaction_1(q_3, q_2, I, eta, Q, S, N)
  q_3*(q_2*I + eta*Q)*S/N;
end

function Rate_Law_for_reaction_3(theta, phi, E)
  theta*phi*E;
end

model Wan2020___risk_estimation_and_prediction_of_the_transmission_of_COVID_19_in_maninland_China_excluding_Hubei_province()
  // Wan2020 - risk estimation and prediction of the transmission of COVID-19 in maninland China excluding Hubei province
  // Background: In December 2019, an outbreak of coronavirus disease (later named as COVID-19) was identified in Wuhan, China and, later on, detected in other parts of China. Our aim is to evaluate the effectiveness of the evolution of interventions and self-protection measures, estimate the risk of partial lifting control measures and predict the epidemic trend of the virus in the mainland of China excluding Hubei province based on the published data and a novel mathematical model. Methods: A novel COVID-19 transmission dynamic model incorporating the intervention measures implemented in China is proposed. COVID-19 daily data of the mainland of China excluding Hubei province, including the cumulative confirmed cases, the cumulative deaths, newly confirmed cases and the cumulative recovered cases between 20 January and 3 March 2020, were archived from the National Health Commission of China (NHCC). We parameterize the model by using the Markov Chain Monte Carlo (MCMC) method and estimate the control reproduction number (Rc), as well as the effective daily reproduction ratio- Re(t), of the disease transmission in the mainland of China excluding Hubei province. Results: The estimation outcomes indicate that Rc is 3.36 (95% CI: 3.20-3.64) and Re(t) has dropped below 1 since 31 January 2020, which implies that the containment strategies implemented by the Chinese government in the mainland of China are indeed effective and magnificently suppressed COVID-19 transmission. Moreover, our results show that relieving personal protection too early may lead to a prolonged disease transmission period and more people would be infected, and may even cause a second wave of epidemic or outbreaks. By calculating the effective reproduction ratio, we prove that the contact rate should be kept at least less than 30% of the normal level by April, 2020. Conclusions: To ensure the pandemic ending rapidly, it is necessary to maintain the current integrated restrict interventions and self-protection measures, including travel restriction, quarantine of entry, contact tracing followed by quarantine and isolation and reduction of contact, like wearing masks, keeping social distance, etc. People should be fully aware of the real-time epidemic situation and keep sufficient personal protection until April. If all the above conditions are met, the outbreak is expected to be ended by April in the mainland of China apart from Hubei province.
  // isDescribedBy pubmed:32831142
  // DOID:0080600
  // hasTaxon taxonomy:9606 taxonomy:2697049
  // hasProperty mamo:MAMO_0000028
  // biomodels.db:MODEL2012090001 biomodels.db:BIOMD0000000981
  // model units - substance: substance, time: time, volume: volume, area: area, length: length, extent: substance

  // Compartments:
  compartment China = 1 volume;  // ncit:C16428

  // Species:
  species Susceptible in China = 1336210000;  // ido:0000514
  species Exposed in China = 501.23;  // ido:0000514; ncit:C171133; hasProperty ido:0000597
  species Infected in China = 0.22839;  // ido:0000511; ncit:C171133
  species Asymptomatic in China = 991.29;  // ido:0000511; ncit:C171133; hasProperty ido:0000569
  species Susceptible_isolated in China = 0;  // ido:0000514; hasProperty ncit:C25549
  species Quarantined in China = 0;  // ido:0000511; ncit:C171133; hasProperty ncit:C71902
  species Hospitalised in China = 2;  // ido:0000511; ncit:C171133; hasProperty ncit:C25179
  species Recovered in China = 240.76;  // ido:0000621
  species $Recovered_from_hospitals in China = 0;  // ido:0000621
  species Deceased in China = 0;  // ncit:C28554
  species $Total_reported_cases in China = 21;
  species $Total_population in China;

  // Parameters:
  beta = 0.054043;
  c_0 = 40.319;
  phi = 0.19231;
  theta = 0.6628;
  eta = 17.379;
  gamma_I = 0.15796;
  gamma_A = 0.55671;
  gamma_H = 0.035352;
  d = 0.00055888;
  xi = 0.80987;
  mu = 0.07142857;
  q1 = 1;
  q2 = 0.47218;
  q3 = 2.6954;
  delta = 0.00028286;

  // Assignment rules:
  Total_population := Asymptomatic + Exposed + Infected + Recovered + Susceptible;
  q_1_t := q1*exp(-delta*Total_reported_cases);
  c_t := c_0*q_1_t;

  // Rate rules:
  Recovered_from_hospitals' = gamma_H*Hospitalised;
  Total_reported_cases' = q2*Infected + eta*Quarantined;

  // Reactions:
  Susceptible_to_Exposed: Susceptible => Exposed; China*Rate_Law_for_reaction(beta, c_t, Infected, xi, Asymptomatic, Susceptible, Total_population);  // modifiers: Infected, Asymptomatic, Total_population; ido:0000597; ncit:C171133
  Susceptible_to_isolated: Susceptible => Susceptible_isolated; China*Rate_Law_for_reaction_1(q3, q2, Infected, eta, Quarantined, Susceptible, Total_population);  // modifiers: Infected, Quarantined, Total_population; ncit:C25549
  Isolated_to_Susceptible: Susceptible_isolated => Susceptible; China*mu*Susceptible_isolated;
  Exposed_to_Infected: Exposed => Infected; China*Rate_Law_for_reaction_3(theta, phi, Exposed);  // ncit:C168447; ncit:C171133; ncit:C128320
  Exposed_to_Asymptomatic: Exposed => Asymptomatic; China*Rate_Law_for_reaction_4(theta, phi, Exposed);  // ncit:C128320; ncit:C168121; ncit:C171133
  Exposed_to_Quarantined: Exposed => Quarantined; China*Rate_Law_for_reaction_5(q3, q2, Infected, eta, Quarantined, Exposed, Total_population);  // modifiers: Infected, Total_population; ncit:C71902
  Infected_to_Hospitalised: Infected => Hospitalised; China*q2*Infected;  // ncit:C25179
  Infected_to_dead: Infected => ; China*d*Infected;  // ncit:C28554
  Infected_to_Recovered: Infected => Recovered; China*gamma_I*Infected;  // ncit:C25746
  Infected_to_Quarantined: Infected => Quarantined; China*Rate_Law_for_reaction_5(q3, q2, Infected, eta, Quarantined, Infected, Total_population);  // modifiers: Total_population; ncit:C71902
  Asymptomatic_to_Recovered: Asymptomatic => Recovered; China*gamma_A*Asymptomatic;  // ncit:C25746
  Asymptomatic_to_Quarantined: Asymptomatic => Quarantined; China*Rate_Law_for_reaction_5(q3, q2, Infected, eta, Quarantined, Asymptomatic, Total_population);  // modifiers: Infected, Total_population; ncit:C71902
  Quarantined_to_Hospitalised: Quarantined => Hospitalised; China*eta*Quarantined;  // ncit:C25179
  Hospitalised_to_Deceased: Hospitalised => Deceased; China*d*Hospitalised;  // ncit:C28554
  Hospitalised_to_Recovered: Hospitalised => Recovered; China*gamma_H*Hospitalised;  // ncit:C25746

  // Unit definitions:
  unit length = metre;
  unit area = metre^2;
  unit volume = 1e-3 litre;
  unit time = 86400 second;
  unit substance = item;
end
