// SBML level 3 version 1
// dcterms:bibliographicCitation: urn:miriam:pubmed:6149699

function Rate_Law_for_reaction_2(k2, f, RL, P)
  k2*f*RL*P;
end

function Rate_Law_for_reaction_4(f, ket, Rs)
  f*ket*Rs;
end

model Gex_Fabry1984___model_of_receptor_mediated_endocytosis_of_EGF_in_BALB_c_3T3_cells()
  // Gex-Fabry1984 - model of receptor-mediated endocytosis of EGF in BALB/c 3T3 cells
  // We present a mathematical model for analyzing, simulating, and quantitating the dynamic and steady-state characteristics of receptor-mediated endocytosis. The basic processes considered by the model are ligand-receptor binding, diffusion of receptors and ligand-receptor complexes in the plane of the membrane toward and away from coated pits, binding of ligand-receptor complexes to coated pit proteins, endocytosis of coated pit contents, degradation of ligand, and recycling of undegraded receptors. The model accounts quantitatively for a wide variety of kinetic data and makes new predictions about steady-state characteristics. We show that for homogeneous receptors the slope of the Scatchard plot is not necessarily constant but can have a positive or negative derivative, depending on the concentration of coated pit proteins and their reactivity. This finding suggests that binding data, which show linear and concave curves, might be explainable be a simple coated pit-related mechanism. Similarly the relationship between the x-intercept and the number of receptors is also affected by kinetic parameters controlling endocytosis. We briefly discuss these results in terms of possible mechanisms for the action of tumor promoters, the large variations in receptor number and affinity in the literature, and methods for quantitative characterization of parameters.
  // isDescribedBy pubmed:6149699
  // GO:0006898
  // BTO:0000218
  // ncit:C20425
  // hasProperty mamo:MAMO_0000046
  // biomodels.db:MODEL2102040001 biomodels.db:BIOMD0000000985
  // model units - substance: substance, time: time, volume: volume, area: area, length: length, extent: substance

  // Compartments:
  compartment Cell = 1 volume;  // BTO:0000218

  // Species:
  species Ligand_EGF in Cell = 1.987306e14;  // ncit:C20425; ncit:C95009; hasProperty ncit:C14136
  species Surface_Receptor_External in Cell = 73000;  // ncit:C17067; hasProperty ncit:C14136
  species Receptor_Ligand_Complex in Cell = 0;  // GO:0043235
  species Internalised_receptors in Cell = 25029;  // ncit:C17067; hasProperty ncit:C14136
  species Receptor_Ligand_Pit_Protein_complex in Cell = 0;  // GO:0030132; GO:0043235; hasProperty ncit:C19398
  species Free_pit_proteins in Cell = 0;  // GO:0030132
  species Internalised_Ligand in Cell = 0;  // ncit:C20425; ncit:C95009; hasProperty GO:0005622

  // Parameters:
  k1 = 81500000;
  k_1 = 0.58; k_1 is "k-1";
  var ke_t; ke_t is "ke(t)";
  ki = 0.049;
  k2 = 0.24;
  k_2 = 0; k_2 is "k-2";
  f = 0.2;
  k1_t = 0.02; k1_t is "k1(t)";
  ke = 0.7;
  epsilon = 0.12;
  delTe = 6.5;
  var Internalised_ligand_1000; Internalised_ligand_1000 is "Internalised_ligand/1000";
  var Surface_receptor_ligand_complex_1000; Surface_receptor_ligand_complex_1000 is "Surface_receptor_ligand_complex/1000";

  // Assignment rules:
  ke_t := ke*(epsilon + (1 - epsilon)*(1 - exp(-(time/delTe))^3));
  Internalised_ligand_1000 := Internalised_Ligand*Cell/1000;
  Surface_receptor_ligand_complex_1000 := Receptor_Ligand_Complex*Cell/1000;

  // Reactions:
  Receptor_Ligand_binding: Surface_Receptor_External + Ligand_EGF => Receptor_Ligand_Complex; Cell*k1*Surface_Receptor_External*Ligand_EGF;  // ncit:C20139
  Receptor_Ligand_dissociation: Receptor_Ligand_Complex => Surface_Receptor_External; Cell*k_1*Receptor_Ligand_Complex;  // ncit:C61559
  Receptor_Ligand_Pit_protein_binding: Receptor_Ligand_Complex + Free_pit_proteins => Receptor_Ligand_Pit_Protein_complex; Cell*Rate_Law_for_reaction_2(k2, f, Receptor_Ligand_Complex, Free_pit_proteins);  // GO:0005515
  Receptor_Ligand_Pit_protein_dissociation: Receptor_Ligand_Pit_Protein_complex => Receptor_Ligand_Complex; Cell*k_2*Receptor_Ligand_Pit_Protein_complex;  // ncit:C61559
  Receptor_internalisation: Surface_Receptor_External => Internalised_receptors; Cell*Rate_Law_for_reaction_4(f, ke_t, Surface_Receptor_External);  // GO:0098739
  Receptor_Ligand_internal_dissociation: Receptor_Ligand_Complex => Internalised_receptors + Internalised_Ligand; Cell*Rate_Law_for_reaction_4(f, ke_t, Receptor_Ligand_Complex);  // ncit:C61559
  Receptor_Ligand_internal_Pit_protein_dissociation: Receptor_Ligand_Pit_Protein_complex => Internalised_receptors + Internalised_Ligand; Cell*ke_t*Receptor_Ligand_Pit_Protein_complex;  // ncit:C61559
  Ligand_utilisation: Internalised_Ligand => ; Cell*k1_t*Internalised_Ligand;
  Receptor_externalisation: Internalised_receptors => Surface_Receptor_External; Cell*ki*Internalised_receptors;  // GO:0140115

  // Unit definitions:
  unit length = metre;
  unit area = metre^2;
  unit volume = litre;
  unit time = 60 second;
  unit substance = item;
end
