// SBML level 2 version 4
// dcterms:bibliographicCitation: urn:miriam:pubmed:32834593

function Rate_Law_for_exposed_to_asymptopmatic(k1, k2, substrate)
  k1*k2*substrate;
end

function Rate_Law_for_exposed_to_symptomatic(k1, k2, substrate)
  k1*(1 - k2)*substrate;
end

model Okuonghae2020___SEAIR_model_of_COVID_19_transmission_in_Lagos__Nigeria()
  // Okuonghae2020 - SEAIR model of COVID-19 transmission in Lagos, Nigeria
  // This work examines the impact of various non-pharmaceutical control measures (government and personal) on the population dynamics of the novel coronavirus disease 2019 (COVID-19) in Lagos, Nigeria, using an appropriately formulated mathematical model. Using the available data, since its first reported case on 16 March 2020, we seek to develop a predicative tool for the cumulative number of reported cases and the number of active cases in Lagos; we also estimate the basic reproduction number of the disease outbreak in the aforementioned State in Nigeria. Using numerical simulations, we show the effect of control measures, specifically the common social distancing, use of face mask and case detection (via contact tracing and subsequent testings) on the dynamics of COVID-19. We also provide forecasts for the cumulative number of reported cases and active cases for different levels of the control measures being implemented. Numerical simulations of the model show that if at least 55% of the population comply with the social distancing regulation with about 55% of the population effectively making use of face masks while in public, the disease will eventually die out in the population and that, if we can step up the case detection rate for symptomatic individuals to about 0.8 per day, with about 55% of the population complying with the social distancing regulations, it will lead to a great decrease in the incidence (and prevalence) of COVID-19.
  // isDescribedBy pubmed:32834593
  // DOID:0080600
  // hasTaxon taxonomy:2697049 taxonomy:9606
  // hasProperty mamo:MAMO_0000028
  // biomodels.db:MODEL2102180001 biomodels.db:BIOMD0000000991

  // Compartments:
  compartment Lagos = 1;  // isPartOf ncit:C16917

  // Species:
  // The susceptible humans.
  species susceptible in Lagos = 14367982;  // ido:0000514
  // Exposed humans (infected but not infectious and show no sign of disease).
  species exposed in Lagos = exposed_start;  // ido:0000514; hasProperty ido:0000597
  // Asymptomatically-infected undetected people.
  species asymptomatic in Lagos = asymptomatic_start;  // ido:0000511; ncit:C171133; hasProperty ido:0000569
  // Symptomatically-infectious undetected humans.
  species symptomatic in Lagos = symptomatic_start;  // ncit:C171133; ido:0000511; hasProperty ido:0000573
  // Detected infectious people (symptomatic and asymptomatic).
  species detected in Lagos = 1;  // ido:0000511; hasProperty ncit:C16210
  // Recovered people.
  species recovered in Lagos = 0;  // hasProperty ido:0000621
  // Deaceased people due to corona.
  species deceased in Lagos = 0;  // ncit:C28554
  species $total_pop in Lagos;
  // The sum over all detected cases over time.
  species detected_cumulative in Lagos = 1;

  // Parameters:
  // Effective transmission rate (important for lambda).
  transmission_rate_effective = 0.4236;
  // Recovery rates for individuals in the asymptomatic class.
  gamma_a = 0.13978 unit_0;
  // Recovery rates for individuals in the symptomatic class.
  gamma_0 = 0.13978 unit_0;
  // Recovery rates for individuals in the detected class.
  gamma_i = 1/15; gamma_i has unit_0;
  // detection rate (via contact tracing and testing) for the symptomatic class.
  psi = 0.0135 unit_0;
  // detection rate (via contact tracing and testing) for the asymptomatic class.
  theta = 1.8999*10^(-12); theta has unit_0;
  // Disease induced death rates for individuals in the symptomatic class.
  d_0 = 0.015 unit_0;
  // Disease induced death rates for individuals in the detected class.
  d_D = 0.015 unit_0;
  // Progression rate from exposed state to infectious state.
  sigma = 1/5.2; sigma has unit_0;
  // Fraction of new infectious humans that are asymptomatic.
  nu = 0.5 unit_0;
  // Modification parameter that accounts for the reduced infectiousness of humans
  // in the A class when compared to humans in the I class.
  alpha = 0.5 unit_0;
  // eps represents the fraction of the entire population that effectively makes use of a face mask (where we assume that the face masks are with high efficacy), any time they are in public.
  eps = 0;
  // delta represents the proportion of the pop- ulation that maintains the minimum distance required to prevent an infection (at least 1 m apart).
  delta = 0;
  // The amount of exposed cases at time 0. Has to be estimated.
  exposed_start = 441;
  // The amount of asymptomatic cases at time 0. Has to be estimated.
  asymptomatic_start = 188;
  // The amount of symptomatic cases at time 0. Has to be estimated.
  symptomatic_start = 212;

  // Assignment rules:
  total_pop := asymptomatic + detected + exposed + recovered + susceptible + symptomatic;
  lam := transmission_rate_effective*(1 - eps)*(1 - delta)*(alpha*asymptomatic + symptomatic)/(total_pop - detected);

  // Reactions:
  susceptible_to_exposed: susceptible => exposed; Lagos*lam*susceptible;  // ido:0000597; ncit:C171133
  exposed_to_symptomatic: exposed => symptomatic; Lagos*Rate_Law_for_exposed_to_symptomatic(sigma, nu, exposed);  // ncit:C128320; ncit:C168447
  exposed_to_asymptopmatic: exposed => asymptomatic; Lagos*Rate_Law_for_exposed_to_asymptopmatic(sigma, nu, exposed);  // ncit:C168121; ncit:C128320
  symptomatic_to_detected: symptomatic => detected + detected_cumulative; Lagos*psi*symptomatic;  // ncit:C16210
  asymptomatic_to_detected: asymptomatic => detected + detected_cumulative; Lagos*theta*asymptomatic;  // ncit:C16210
  symptomatic_to_recovered: symptomatic => recovered; Lagos*gamma_0*symptomatic;  // ncit:C25746
  asymptomatic_to_recovered: asymptomatic => recovered; Lagos*gamma_a*asymptomatic;  // ncit:C25746
  detected_to_recovered: detected => recovered; Lagos*gamma_i*detected;  // ncit:C25746
  symptomatic_to_deceased: symptomatic => deceased; Lagos*d_0*symptomatic;  // ncit:C28554
  detected_to_deceased: detected => deceased; Lagos*d_D*detected;  // ncit:C28554

  // Unit definitions:
  unit length = metre;
  unit area = metre^2;
  unit volume = 1e-3 litre;
  unit time = 86400 second;
  unit substance = item;
  unit unit_0 = 1 / (86400 second); unit_0 is "1/d";
end
