// SBML level 2 version 4
// dcterms:bibliographicCitation: urn:miriam:pubmed:12379154

function Mass_action_2(b, k1, product, substrate, k2)
  b*k1*substrate - k2*product;
end

function auto_amplification(a, r, T0, Tum)
  a*r*Tum*(1 - Tum/T0);
end
auto_amplification is "auto-amplification";

function Mass_action_4(k1, b, k2, product, modifier)
  k1*modifier - b*k2*product;
end

function function_for_cell_detachment(n, k1, substrate, b, k2, modifier)
  n*(k1*substrate - b*k2*modifier);
end

function clearance_0(d, c, Tplas)
  d*c*Tplas;
end

model Siddhartha2002___Kinetic_modelling_of_cancer_therapies()
  // Siddhartha2002 - Kinetic modelling of cancer therapies
  // biomodels.db:MODEL2204120001 biomodels.db:BIOMD0000001048
  // occursIn ncit:C98275
  // hasTaxon taxonomy:9606
  // isDescribedBy pubmed:12379154
  // hasProperty ncit:C3224 ncit:C16212 ncit:C3058 mamo:MAMO_0000046
  // isDescribedBy pubmed:12379154

  // Compartments:
  compartment Tumor = 1;  // ncit:C98275

  // Species:
  species Ttum in Tumor = 1000000;  // ncit:C3262
  species Tplas in Tumor = 4000000;  // hasProperty ncit:C62970
  species Tnew in Tumor = 0;  // ncit:C8509

  // Parameters:
  a = 0.2;
  b = 0.2;
  c = 0.67;
  d = 1;
  kf1 = 0.067;
  kf2 = 0.00067;
  kr1 = 0.00067;
  kr2 = 0.067;
  T0 = 3000000;
  n = 10;
  r = 0.069;

  // Reactions:
  migration_to_bloodstream: Ttum => Tplas; Tumor*Mass_action_2(b, kf1, Tplas, Ttum, kr1);  // isVersionOf GO:0090130
  clearance: Tplas => ; Tumor*clearance_0(d, c, Tplas);  // isVersionOf ncit:C94618
  cell_attachment_to_new_tumor: => Tnew; Tumor*Mass_action_4(kf2, b, kr2, Tnew, Tplas);  // modifiers: Tplas; isVersionOf ncit:C61470
  new_tumor_auto_amplification: => Tnew; Tumor*auto_amplification(a, r, T0, Tnew); new_tumor_auto_amplification is "new tumor auto-amplification";  // isVersionOf GO:0040007
  old_tumor_auto_amplification: => Ttum; Tumor*auto_amplification(a, r, T0, Ttum); old_tumor_auto_amplification is "old tumor auto-amplification";  // isVersionOf GO:0040007
  cell_detachment: Tplas => ; Tumor*function_for_cell_detachment(n, kf2, Tplas, b, kr2, Tnew);  // modifiers: Tnew; isVersionOf ncit:C42882

  // Unit definitions:
  unit length = metre;
  unit area = metre^2;
  unit volume = litre;
  unit time = 86400 second;
  unit substance = mole;
end
