// SBML level 2 version 4
// dcterms:bibliographicCitation: DOI urn:miriam:doi:10.1038/s41598-020-62526-6

function function_for_biomass_production(k2, Ap, Gp)
  k2*Ap*Gp;
end

function function_for_diffusion_of_Ammonia_from_interior_to_middle_layer(k3, Ai)
  k3*Ai;
end

function function_for_production_of_Ammonia_using_Glutamate_by_inner_cells(k5, Gi)
  k5*Gi;
end

function function_Gp_diffusion_to_the_interior_cells(k4, Gp)
  k4*Gp;
end

function function_for_positive_feedback_of_Gp_on_itself(k1, Ge, Gp)
  k1*Ge*Gp;
end

function function_for_ammonia_diffusion_from_middle_layer_to_periphery(k3, Am)
  k3*Am;
end

function function_for_loss_of_Ammonia_du_to_diffusion_to_the_environment(k3, Ap)
  k3*Ap;
end

function function_for_diffusion_of_Glutamate_from_middle_to_interior_layer(k4, Gm)
  k4*Gm;
end

function function_for_production_of_Ammonia_in_middle_layer_using_glutamate(k5, Gm)
  k5*Gm;
end

function function_for_use_of_glutamate_in_middle_layer_for_biomass_production(k2, Am, Gm)
  k2*Am*Gm;
end

model Garde2020___metabolic_oscillations_in_Bacillus_subtilis_biofilms()
  // Garde2020 - metabolic oscillations in Bacillus subtilis biofilms
  // biomodels.db:MODEL2204180002 biomodels.db:BIOMD0000001053
  // occursIn BTO:0002690
  // hasTaxon taxonomy:1423
  // isDescribedBy doi:10.1038/s41598-020-62526-6
  // hasProperty GO:0008152 GO:0019222 mamo:MAMO_0000046
  // isDescribedBy doi:10.1038/s41598-020-62526-6

  // Compartments:
  compartment Biofilm = 1;  // BTO:0002690

  // Species:
  species Gp in Biofilm = 1;  // isVersionOf CHEBI:32484
  species Ai in Biofilm = 1;  // isVersionOf CHEBI:16134
  species Am in Biofilm = 1;  // isVersionOf CHEBI:16134
  species Ap in Biofilm = 1;  // isVersionOf CHEBI:16134
  species Gm in Biofilm = 1;  // isVersionOf CHEBI:32484
  species Gi in Biofilm = 1;  // isVersionOf CHEBI:32484

  // Parameters:
  k1 = 0.34 unit_0;
  k2 = 5.3 unit_0;
  k3 = 4 unit_1;
  k4 = 2 unit_2;
  k5 = 2.3 unit_2;
  Ge = 30 unit_3;

  // Reactions:
  Positive_feedback_of_Gp_on_itself: => Gp; Biofilm*function_for_positive_feedback_of_Gp_on_itself(k1, Ge, Gp);  // isVersionOf ncit:C82652
  Gp_diffusion_to_the_interior_cells: Gp => Gm; Biofilm*function_Gp_diffusion_to_the_interior_cells(k4, Gp);  // isVersionOf ncit:C82333; isVersionOf GO:0022803
  Biomass_production: Gp => ; Biofilm*function_for_biomass_production(k2, Ap, Gp);  // modifiers: Ap
  Diffusion_of_Ammonia_from_interior_to_middle_layer: Ai => Am; Biofilm*function_for_diffusion_of_Ammonia_from_interior_to_middle_layer(k3, Ai);  // GO:0022803; isVersionOf ncit:C82333
  Production_of_Ammonia_using_Glutamate_by_inner_cells: Gi => Ai; Biofilm*function_for_production_of_Ammonia_using_Glutamate_by_inner_cells(k5, Gi);
  Ammonia_diffusion_from_middle_layer_to_periphery: Am => Ap; Biofilm*function_for_ammonia_diffusion_from_middle_layer_to_periphery(k3, Am);  // isVersionOf GO:0022803; isVersionOf sbo:C82333
  loss_of_Ammonia_du_to_diffusion_to_the_environment: Ap => ; Biofilm*function_for_loss_of_Ammonia_du_to_diffusion_to_the_environment(k3, Ap);  // isVersionOf GO:0022803; isVersionOf sbo:C82333
  Diffusion_of_Glutamate_from_middle_to_interior_layer: Gm => Gi; Biofilm*function_for_diffusion_of_Glutamate_from_middle_to_interior_layer(k4, Gm);  // isVersionOf GO:0022803; isVersionOf sbo:C82333
  Production_of_Ammonia_in_middle_layer_using_glutamate: Gm => Am; Biofilm*function_for_production_of_Ammonia_in_middle_layer_using_glutamate(k5, Gm);
  Use_of_glutamate_in_middle_layer_for_biomass_production: Gm => ; Biofilm*function_for_use_of_glutamate_in_middle_layer_for_biomass_production(k2, Am, Gm);  // modifiers: Am

  // Unit definitions:
  unit length = metre;
  unit area = metre^2;
  unit volume = litre;
  unit time = 3600 second;
  unit substance = 1e-3 mole;
  unit unit_0 = litre / (1e-3 mole * 3600 second); unit_0 is "(mmol/l*h)^-1";
  unit unit_1 = 1 / (3600 second); unit_1 is "h^-1";
  unit unit_2 = 1 / (3600 second); unit_2 is "1/h";
  unit unit_3 = 1e-3 mole / litre; unit_3 is "mmol/l";
end
