// SBML level 2 version 4
// dcterms:bibliographicCitation: urn:miriam:pubmed:33751272

model Pearce2021___Fibrin_Polymerization()
  // Pearce2021 - Fibrin Polymerization
  // Here is an ode model for in vitro fibrin matrix polymerization reproducing interactions among fibrinogen, fibrin and other proteins involved in the homeostatic phase of wound healing.
  // biomodels.db:MODEL2204200001 biomodels.db:BIOMD0000001054
  // occursIn BTO:0000393
  // hasTaxon taxonomy:9606
  // isDescribedBy pubmed:33751272
  // hasProperty GO:0051258 GO:0042060 mamo:MAMO_0000046
  // isDescribedBy pubmed:33751272

  // Compartments:
  compartment Endothelium = 1;  // isVersionOf BTO:0000393

  // Species:
  species Fbna in Endothelium = 0;  // isVersionOf uniprot:Q9UE34; isVersionOf PATO:0002354
  species FM in Endothelium = 0.15;  // isVersionOf CHEBI:5054; hasProperty ncit:C45805
  species Thb in Endothelium = 1;  // isVersionOf CHEBI:9574
  species Fbni in Endothelium = 2.5;  // isVersionOf uniprot:Q9UE34; hasProperty PATO:0002355
  species C0 in Endothelium = 0;  // hasPart uniprot:Q9UE34; hasPart CHEBI:9574; isVersionOf CHEBI:64297; isVersionOf GO:0005577
  species C1 in Endothelium = 0;  // hasPart uniprot:Q9UE34; hasPart CHEBI:9574; isVersionOf CHEBI:64297; isVersionOf GO:0005577
  species C2 in Endothelium = 0;  // hasPart uniprot:Q9UE34; hasPart CHEBI:9574; isVersionOf CHEBI:64297; isVersionOf GO:0005577

  // Parameters:
  k = 1931;
  k_0 = 0.031; k_0 is "k+";
  k_1 = 366; k_1 is "k-";
  k1 = 0.49; k1 is "k1+";
  k1_0 = 250; k1_0 is "k1-";
  k2 = 298; k2 is "k2+";
  k2_0 = 0.26; k2_0 is "k2-";
  k3 = 2.66; k3 is "k3+";
  k3_0 = 26.9; k3_0 is "k3-";
  k4 = 15.5; k4 is "k4+";
  k4_0 = 375; k4_0 is "k4-";

  // Reactions:
  _1: Fbna + Thb => C1; Endothelium*k1*Fbna*Thb;
  _2: C1 => Fbna + Thb; Endothelium*k1_0*C1;
  _3: C1 + Fbna => C2; Endothelium*k3*C1*Fbna;
  _4: C2 => C1 + Fbna; Endothelium*k3_0*C2;
  _5: C0 => Thb + Fbna; Endothelium*k*C0;
  _6: C1 => FM + Thb; Endothelium*k2*C1;
  _7: FM + Thb => C1; Endothelium*k2_0*FM*Thb;
  _8: C2 => C1 + FM; Endothelium*k4*C2;
  _9: FM + C1 => C2; Endothelium*k4_0*FM*C1;
  _10: Thb + Fbni => C0; Endothelium*k_0*Thb*Fbni;
  _11: C0 => Thb + Fbni; Endothelium*k_1*C0;

  // Unit definitions:
  unit length = metre;
  unit area = metre^2;
  unit volume = litre;
  unit time = second;
  unit substance = mole;
end
