// SBML level 2 version 4
// dcterms:bibliographicCitation: urn:miriam:doi:10.1038/s41598-018-20348-7

function function_for_reaction_4(k2, E1, Es, c2, Em, e2, El, S2, K1, S3)
  k2*(E1 + Es + c2*Em + e2*El)*S2*K1/(K1 + S3);
end

function Constant_flux__irreversible(v)
  v;
end
Constant_flux__irreversible is "Constant flux (irreversible)";

function function_for_reaction_18(k_al, EL)
  11*k_al*EL;
end

function function_for_reaction_22(k_d, E3, c_d, e_d, EL, alpha, S3, K3, EM)
  k_d*(E3 + c_d*EM + e_d*EL)*(1 + alpha*S3/(S3 + K3));
end

function function_for_reaction_10(k5, S5, E3i)
  k5*E3i*S5;
end

function function_for_reaction_12(k_6, E4, C_6, EM, e_6, EL, S7)
  k_6*(E4 + C_6*EM + e_6*EL)*S7;
end

function function_for_reaction_17(kal, EM)
  11*kal*EM^11;
end

function function_for_reaction_5(k_2, E2, C_2, EM, e_2, EL, S3, K2, S2)
  k_2*(E2 + C_2*EM + e_2*EL)*S3*K2/(K2 + S2);
end

function function_for_reaction_17_1(kal, EM)
  kal*EM^11;
end

model Jeon2018___Enzyme_clustering_in_Glucose_metabolism()
  // Jeon2018 - Enzyme clustering in Glucose metabolism
  // biomodels.db:MODEL2204290002 biomodels.db:BIOMD0000001055
  // hasTaxon taxonomy:9606
  // isDescribedBy doi:10.1038/s41598-018-20348-7
  // hasProperty GO:0006006 mamo:MAMO_0000046
  // isDescribedBy doi:10.1038/s41598-018-20348-7

  // Compartments:
  compartment Cytoplasm = 1;  // GO:0005737

  // Species:
  species Glucose in Cytoplasm = 0.01;  // isVersionOf CHEBI:64297; isVersionOf CHEBI:25212; isVersionOf CHEBI:17234
  species Fructose_6_Phosphate in Cytoplasm = 0.01; Fructose_6_Phosphate is "Fructose-6-Phosphate";  // isVersionOf CHEBI:64297; isVersionOf CHEBI:25212; isVersionOf CHEBI:78697
  species Fructose_1_6_Bisphosphate in Cytoplasm = 0.01; Fructose_1_6_Bisphosphate is "Fructose-1,6,Bisphosphate";  // isVersionOf CHEBI:78682; isVersionOf CHEBI:25212; isVersionOf CHEBI:64297
  species _3_Phosphoglycerate in Cytoplasm = 0.01; _3_Phosphoglycerate is "3-Phosphoglycerate";  // isVersionOf CHEBI:25212; isVersionOf CHEBI:61304; isVersionOf CHEBI:64297
  species Phosphoenolpyruvate in Cytoplasm = 0.01;  // isVersionOf CHEBI:25212; isVersionOf CHEBI:18021; isVersionOf CHEBI:64297
  species Pyruvate in Cytoplasm = 0.01;  // isVersionOf CHEBI:64297; isVersionOf CHEBI:15361; isVersionOf CHEBI:25212
  species Oxaloacetate in Cytoplasm = 0.01;  // isVersionOf CHEBI:64297; isVersionOf CHEBI:30744; isVersionOf CHEBI:25212
  species Metabolic_outcome_of_Pentose_Phosphate_Shunt in Cytoplasm = 0.01;  // isVersionOf CHEBI:25212
  species Metabolic_outcome_of_Serine_Biosynthesis_Flux in Cytoplasm = 0.01;  // isVersionOf CHEBI:25212
  species Metabolic_outcome_of_Glycolytic_Flux in Cytoplasm = 0.01;  // isVersionOf CHEBI:25212
  species Phosphofructokinase_1 in Cytoplasm = 99.99;  // isVersionOf uniprot:P08237; isVersionOf ncit:C28597
  species Fructose_1_6_Bisphosphatase in Cytoplasm = 100; Fructose_1_6_Bisphosphatase is "Fructose-1,6-Bisphosphatase";  // isVersionOf uniprot:P09467; isVersionOf ncit:C16981
  species Large_sized_enzyme_clusters in Cytoplasm = 0; Large_sized_enzyme_clusters is "Large-sized enzyme clusters";  // hasPart uniprot:P30613; hasPart uniprot:P09467; hasPart uniprot:P35558; hasPart uniprot:P08237
  species Medium_sized_enzyme_clusters in Cytoplasm = 0; Medium_sized_enzyme_clusters is "Medium-sized enzyme clusters";  // hasPart uniprot:P30613; hasPart uniprot:P35558; hasPart uniprot:P09467; hasPart uniprot:P08237
  species Small_sized_enzyme_clusters in Cytoplasm = 0; Small_sized_enzyme_clusters is "Small-sized enzyme clusters";  // hasPart uniprot:P08237
  species Pyruvate_Kinase_M2_dimers in Cytoplasm = 99.99;  // hasPart uniprot:P30613
  species Phosphoenolpyruvate_Carboxykinase_1 in Cytoplasm = 100;  // isVersionOf ncit:C28597; isVersionOf uniprot:P35558
  species Glycosylated_Phosphofructokinase in Cytoplasm = 0.01;  // isVersionOf uniprot:P08237; hasProperty ncit:C21034
  species Pyruvate_Kinase_M2_tetramers in Cytoplasm = 1;  // hasPart uniprot:P30613

  // Parameters:
  k1 = 10;
  k_1 = 10; k_1 is "k-1";
  k2 = 40;
  k_2 = 7; k_2 is "k-2";
  k3 = 10;
  k_3 = 10; k_3 is "k-3";
  k4 = 14;
  k_4 = 7; k_4 is "k-4";
  k5 = 1;
  k_5 = 10; k_5 is "k-5";
  k_6 = 10; k_6 is "k-6";
  kas = 0;
  k_as = 0; k_as is "k-as";
  kam = 0;
  k_am = 0; k_am is "k-am";
  kal = 0;
  k_al = 0; k_al is "k-al";
  kg = 1;
  k_g = 1; k_g is "k-g";
  kd = 1;
  k_d = 1; k_d is "k-d";
  kp = 5;
  ks = 5;
  kf = 5;
  delta_p = 0.5; delta_p is "delta-p";
  delta_s = 0.5;
  delta_f = 0.5;
  c2 = 0;
  c_2 = 0; c_2 is "c-2";
  c_6 = 0; c_6 is "c-6";
  e2 = 0;
  e_2 = 0; e_2 is "e-2";
  e_6 = 0; e_6 is "e-6";
  e_d = 0; e_d is "e-d";
  c_d = 0; c_d is "c-d";
  alpha = 1;
  K1 = 1;
  K2 = 1;
  K3 = 1;
  k0 = 10;

  // Reactions:
  R1: => Glucose; Cytoplasm*Constant_flux__irreversible(k0);  // isVersionOf GO:0046323
  R2: Glucose => Fructose_6_Phosphate; Cytoplasm*k1*Glucose;  // isVersionOf reactome:R-HSA-70471
  R3: Fructose_6_Phosphate => Glucose; Cytoplasm*k_1*Fructose_6_Phosphate;  // isVersionOf reactome:R-HSA-70475
  R4: Fructose_6_Phosphate => Fructose_1_6_Bisphosphate; Cytoplasm*function_for_reaction_4(k2, Phosphofructokinase_1, Small_sized_enzyme_clusters, c2, Medium_sized_enzyme_clusters, e2, Large_sized_enzyme_clusters, Fructose_6_Phosphate, K1, Fructose_1_6_Bisphosphate);  // modifiers: Phosphofructokinase_1, Small_sized_enzyme_clusters, Medium_sized_enzyme_clusters, Large_sized_enzyme_clusters; isVersionOf GO:0016310
  R5: Fructose_1_6_Bisphosphate => Fructose_6_Phosphate; Cytoplasm*function_for_reaction_5(k_2, Fructose_1_6_Bisphosphatase, c_2, Medium_sized_enzyme_clusters, e_2, Large_sized_enzyme_clusters, Fructose_1_6_Bisphosphate, K2, Fructose_6_Phosphate);  // modifiers: Fructose_1_6_Bisphosphatase, Medium_sized_enzyme_clusters, Large_sized_enzyme_clusters; isVersionOf GO:0016311
  R6: Fructose_1_6_Bisphosphate => _3_Phosphoglycerate; Cytoplasm*k3*Fructose_1_6_Bisphosphate;  // isVersionOf reactome:R-HSA-71496
  R7: _3_Phosphoglycerate => Fructose_1_6_Bisphosphate; Cytoplasm*k_3*_3_Phosphoglycerate;  // isVersionOf reactome:R-HSA-71496
  R8: _3_Phosphoglycerate => Phosphoenolpyruvate; Cytoplasm*k4*_3_Phosphoglycerate;  // hasProperty GO:0004619; hasProperty GO:0004634
  R9: Phosphoenolpyruvate => _3_Phosphoglycerate; Cytoplasm*k_4*Phosphoenolpyruvate;  // hasProperty GO:0004619; hasProperty GO:0004634
  R10: Phosphoenolpyruvate => Pyruvate; Cytoplasm*function_for_reaction_10(k5, Phosphoenolpyruvate, Pyruvate_Kinase_M2_tetramers);  // modifiers: Pyruvate_Kinase_M2_tetramers
  R11: Pyruvate => Oxaloacetate; Cytoplasm*k_5*Pyruvate;  // isVersionOf GO:0004736
  R12: Oxaloacetate => Phosphoenolpyruvate; Cytoplasm*function_for_reaction_12(k_6, Phosphoenolpyruvate_Carboxykinase_1, c_6, Medium_sized_enzyme_clusters, e_6, Large_sized_enzyme_clusters, Oxaloacetate);  // modifiers: Phosphoenolpyruvate_Carboxykinase_1, Medium_sized_enzyme_clusters, Large_sized_enzyme_clusters; isVersionOf GO:0004611
  R13: Phosphofructokinase_1 => Small_sized_enzyme_clusters; Cytoplasm*kas*Phosphofructokinase_1;
  R14: Small_sized_enzyme_clusters => Phosphofructokinase_1; Cytoplasm*k_as*Small_sized_enzyme_clusters;
  R15: Small_sized_enzyme_clusters + Fructose_1_6_Bisphosphatase + Pyruvate_Kinase_M2_dimers + Phosphoenolpyruvate_Carboxykinase_1 => Medium_sized_enzyme_clusters; Cytoplasm*kam*Small_sized_enzyme_clusters*Fructose_1_6_Bisphosphatase*Pyruvate_Kinase_M2_dimers*Phosphoenolpyruvate_Carboxykinase_1;
  R16: Medium_sized_enzyme_clusters => Small_sized_enzyme_clusters + Fructose_1_6_Bisphosphatase + Pyruvate_Kinase_M2_dimers + Phosphoenolpyruvate_Carboxykinase_1; Cytoplasm*k_am*Medium_sized_enzyme_clusters;
  R17: Medium_sized_enzyme_clusters => ; Cytoplasm*function_for_reaction_17(kal, Medium_sized_enzyme_clusters);
  R18: => Medium_sized_enzyme_clusters; Cytoplasm*function_for_reaction_18(k_al, Large_sized_enzyme_clusters);  // modifiers: Large_sized_enzyme_clusters
  R19: Phosphofructokinase_1 => Glycosylated_Phosphofructokinase; Cytoplasm*kg*Phosphofructokinase_1;
  R20: Glycosylated_Phosphofructokinase => Phosphofructokinase_1; Cytoplasm*k_g*Glycosylated_Phosphofructokinase;  // isVersionOf GO:0006517
  R21: Pyruvate_Kinase_M2_tetramers => Pyruvate_Kinase_M2_dimers; Cytoplasm*kd*Pyruvate_Kinase_M2_tetramers;
  R22: Pyruvate_Kinase_M2_dimers => Pyruvate_Kinase_M2_tetramers; Cytoplasm*function_for_reaction_22(k_d, Pyruvate_Kinase_M2_dimers, c_d, e_d, Large_sized_enzyme_clusters, alpha, Fructose_1_6_Bisphosphate, K3, Medium_sized_enzyme_clusters);  // modifiers: Large_sized_enzyme_clusters, Fructose_1_6_Bisphosphate, Medium_sized_enzyme_clusters
  R23: Fructose_6_Phosphate => Metabolic_outcome_of_Pentose_Phosphate_Shunt; Cytoplasm*kp*Fructose_6_Phosphate;  // isVersionOf GO:0008152
  R24: _3_Phosphoglycerate => Metabolic_outcome_of_Serine_Biosynthesis_Flux; Cytoplasm*ks*_3_Phosphoglycerate;  // isVersionOf GO:0008152
  R25: Pyruvate => Metabolic_outcome_of_Glycolytic_Flux; Cytoplasm*kf*Pyruvate;  // isVersionOf GO:0008152
  R26: Metabolic_outcome_of_Pentose_Phosphate_Shunt => ; Cytoplasm*delta_p*Metabolic_outcome_of_Pentose_Phosphate_Shunt;
  R27: Metabolic_outcome_of_Serine_Biosynthesis_Flux => ; Cytoplasm*delta_s*Metabolic_outcome_of_Serine_Biosynthesis_Flux;
  R28: Metabolic_outcome_of_Glycolytic_Flux => ; Cytoplasm*delta_f*Metabolic_outcome_of_Glycolytic_Flux;
  R17_1: => Large_sized_enzyme_clusters; Cytoplasm*function_for_reaction_17_1(kal, Medium_sized_enzyme_clusters);  // modifiers: Medium_sized_enzyme_clusters
  R18_1: Large_sized_enzyme_clusters => ; Cytoplasm*k_al*Large_sized_enzyme_clusters;

  // Unit definitions:
  unit length = metre;
  unit area = metre^2;
  unit volume = litre;
  unit time = second;
  unit substance = mole;
end
