// SBML level 2 version 4
// dcterms:bibliographicCitation: urn:miriam:pubmed:24039566

function Fy_syn(B, Y, kappa)
  B*Y/3/kappa;
end
Fy_syn is "Fy_prod";

function FV_v_reg(B, D_null, H, Q_max, V_m, X, a, b, delta, eta, k, sigma_comma, tau_v, theta, v_vb, v_vd, v_vh, v_vm)
  (v_vm*Q_max/(1 + exp((theta - V_m)/sigma_comma)) + v_vd*(a*k*(X + delta) + b) + v_vh*eta*H + v_vb*eta*B + D_null)/tau_v;
end

function Rate_Law_for_H_degradation(H, chi)
  1/chi*H;
end

function Fx_reg_y(Y, kappa)
  Y/kappa;
end

function Rate_Law_for_V_m_degradation(V_m, tau_m)
  1/tau_m*V_m;
end

function Fn_deg(alpha, beta, n)
  60*(alpha + beta)*n;
end

function FH_reg_V_m(Q_max, V_m, chi, mu, sigma_comma, theta)
  mu*Q_max/(1 + exp((theta - V_m)/sigma_comma))/chi;
end

function Fn_syn(alpha)
  60*alpha;
end
Fn_syn is "Fn_prod";

function FV_m_reg(A_null, Q_max, V_v, X, a, b, delta, k, sigma_comma, tau_m, theta, v_md, v_mv)
  (v_mv*Q_max/(1 + exp((theta - V_v)/sigma_comma)) + v_md*(a*k*(X + delta) + b) + A_null)/tau_m;
end

function Fx_prod(B, Theta, X, gamma, kappa, q, rho)
  (gamma*(X/3 + 4/3*X^3 - 256/105*X^7) + B + rho*(1/3 - Theta)*(1 - tanh(q*X)))/kappa;
end

function Fy_reg_x(B, X, day, f, h, kappa, tau_c)
  -X*((day/(f*tau_c))^2 + h*B)/kappa;
end

function Rate_Law_for_V_v_degradation(V_v, tau_v)
  1/tau_v*V_v;
end

model Phillips2013___physiologically_based_modeling_explaining_Mammalian_rest_activity_patterns()
  // Phillips2013 - physiologically based modeling explaining Mammalian rest/activity patterns
  // biomodels.db:MODEL2003080001 biomodels.db:BIOMD0000001072
  // hasTaxon taxonomy:40674
  // isDescribedBy pubmed:24039566
  // hasProperty GO:0042745 mamo:MAMO_0000046
  // isDescribedBy pubmed:24039566
  // hasProperty mamo:MAMO_0000046

  // Compartments:
  compartment individual = 1; individual is "Default";

  // Species:
  species V_v in individual = 3.820079; V_v is "V_v(mean_cell_body_potential_VLPO)";  // hasProperty UBERON:8440014
  species V_m in individual = -17.59812; V_m is "V_m(mean_cell_body_potential_MA)";
  species H in individual = 5.573771; H is "H(sleep_homeostatic_drive)";  // isVersionOf GO:0160060
  species n in individual = 0; n is "n(fraction_of_photoreceptors_that_are_activated)";  // hasProperty ncit:C32954
  species X in individual = -0.6442299; X is "x(SCN_activity)";  // hasProperty ncit:C74537
  species Y in individual = -0.8035278; Y is "y(complement_of_x)";

  // Parameters:
  Theta = 0;
  Q_max = 100 unit_0;
  theta = 10 unit_1;
  sigma_comma = 3 unit_1;
  G = 37;
  r = 0.4;
  h = 0.55;
  q = 10;
  rho = 0.032;
  kappa = 12/pi*3600; kappa has unit_2;
  f = 0.99729;
  tau_c = 24.2 unit_3;
  gamma = 0.13;
  delta = -0.7;
  a = 1;
  k = 17 unit_0;
  b = 4.8 unit_0;
  v_vd = -0.17 unit_4;
  v_md = -0.08 unit_4;
  v_vb = 0 unit_4;
  eta = 1 unit_0;
  A_null = 1.3 unit_1;
  D_null = -4.8 unit_1;
  chi = 22*3600; chi has unit_2;
  mu = 4.4 unit_2;
  v_vh = 1 unit_4;
  v_vm = -2.1 unit_4;
  v_mv = -1.8 unit_4;
  tau_v = 10 unit_2;
  tau_m = 10 unit_2;
  B has unit_0;
  alpha has unit_0;  // hasProperty SBO:0000656; hasProperty SBO:0000656
  beta = 0.4/3600; beta has unit_0;
  day = 24 unit_3;
  Qm has unit_0;
  B_circumflex has unit_0;
  Omega = 0;
  I_on = 0 unit_5;
  I_tilded has unit_5;
  I = 0;
  alpha_null = 6/3600; alpha_null has unit_0;
  I_null = 9500 unit_5;
  p = 0.5;
  I_one = 10 unit_5;
  Initial_for_G = G;
  Initial_for_I_null = I_null;
  Initial_for_I_on = I_on;
  Initial_for_Q_max = Q_max;
  Initial_for_alpha_null = alpha_null;
  Initial_for_p = p;
  Initial_for_r = r;
  Initial_for_sigma_comma = sigma_comma;
  Initial_for_theta = theta;

  // Assignment rules:
  Qm := Initial_for_Q_max/(1 + exp((Initial_for_theta - V_m)/Initial_for_sigma_comma));
  I_tilded := Omega*Initial_for_I_on*piecewise(I - 24*3600*ceil(I/(24*3600)), xor(I < 0, 24*3600 < 0), I - 24*3600*floor(I/(24*3600)));
  alpha := Initial_for_alpha_null*(I_tilded/Initial_for_I_null)^Initial_for_p*(I_tilded/(I_tilded + I_one));
  B_circumflex := Initial_for_G*alpha*(1 - n);
  B := (1 - Initial_for_r*X)*(1 - Initial_for_r*Y)*B_circumflex;

  // Reactions:
  Vm_deg: V_m => ; individual*Rate_Law_for_V_m_degradation(V_m, tau_m); Vm_deg is "V_m_Degradation";  // SBO:0000179
  Vv_deg: V_v => ; individual*Rate_Law_for_V_v_degradation(V_v, tau_v); Vv_deg is "V_v_Degradation";  // SBO:0000179
  Vm_Vv: => V_v; individual*FV_v_reg(B, D_null, H, Q_max, V_m, X, a, b, delta, eta, k, sigma_comma, tau_v, theta, v_vb, v_vd, v_vh, v_vm); Vm_Vv is "V_v_Regulation";  // modifiers: V_m, H, X; isVersionOf GO:0009966
  Vv_Vm: => V_m; individual*FV_m_reg(A_null, Q_max, V_v, X, a, b, delta, k, sigma_comma, tau_m, theta, v_md, v_mv); Vv_Vm is "V_m_Regulation";  // modifiers: V_v, X; isVersionOf GO:0009966
  Vm_H: => H; individual*FH_reg_V_m(Q_max, V_m, chi, mu, sigma_comma, theta); Vm_H is "H_Regulation_by_V_m";  // modifiers: V_m; isVersionOf GO:0009966
  H_deg: H => ; individual*Rate_Law_for_H_degradation(H, chi); H_deg is "H_Degradation";  // SBO:0000179
  X_syn: => X; individual*Fx_prod(B, Theta, X, gamma, kappa, q, rho); X_syn is "x_Production";  // hasProperty SBO:0000393; hasProperty SBO:0000393
  Y_syn: => Y; individual*Fy_syn(B, Y, kappa); Y_syn is "y_Production";  // hasProperty SBO:0000393; hasProperty SBO:0000393
  n_deg: n => ; individual*Fn_deg(alpha, beta, n); n_deg is "n_Degradation";  // SBO:0000179
  n_syn: => n; individual*Fn_syn(alpha); n_syn is "n_Production";  // SBO:0000393
  Y_X: => X; individual*Fx_reg_y(Y, kappa); Y_X is "x_Regulation_by_y";  // modifiers: Y; isVersionOf GO:0009966
  X_Y: => Y; individual*Fy_reg_x(B, X, day, f, h, kappa, tau_c); X_Y is "y_Regulation_by_x";  // modifiers: X; isVersionOf GO:0009966

  // Events:
  asleep: at (Initial_for_Q_max/(1 + exp(Initial_for_theta - V_m/Initial_for_sigma_comma)) <= 1): Theta = 1, Omega = 0.03;
  awake: at (Initial_for_Q_max/(1 + exp(Initial_for_theta - V_m/Initial_for_sigma_comma)) > 1): Theta = 0, Omega = 1;
  day_0: at (time < 12*3600): I = 1;
  night: at (time >= 12*3600): I = 0;

  // Unit definitions:
  unit length = metre;
  unit area = metre^2;
  unit volume = litre;
  unit time = second;
  unit substance = dimensionless^0;
  unit unit_0 = 1 / second; unit_0 is "1/s";
  unit unit_1 = 1e-3 volt; unit_1 is "mV";
  unit unit_2 = second; unit_2 is "s";
  unit unit_3 = 3600 second; unit_3 is "h";
  unit unit_4 = 1e-3 volt * second; unit_4 is "mV*s";
  unit unit_5 = lux; unit_5 is "lx";
end
